# OpenSim document version 40000
Model JIA_ANKLE_MRI_R_auto:
  gravity: 0 -9.8081 0
  credits:
    Luca Modenese, Jean-Baptiste Renault 2020. Model created using the STAPLE (Shared Tools for Automatic Personalised Lower Extremity) modelling toolbox. GitHub page: https://github.com/modenaxe/msk-STAPLE.
  Ground
  BodySet:
    Body tibia_r: mass=0.07442176 [kg] mass_center=(-0.05973765 0.01333547 0.03687372)
        inertia=(5.523111e-5 5.961233e-5 1.507759e-5 -5.928659e-5 -0.0001639325 3.659529e-5)
        meshes=example_auto2020_ankle_R_Geometry\tibia_r.obj
    Body talus_r: mass=0.03059041 mass_center=(-0.0557269 0.006092795 -0.005898451)
        inertia=(5.636354e-6 3.26802e-6 6.370899e-6 -1.038644e-5 1.005514e-5 -1.09936e-6)
        meshes=example_auto2020_ankle_R_Geometry\talus_r.obj
    Body calcn_r: mass=0.1314373 mass_center=(-0.05583015 -0.01021536 -0.03696492)
        inertia=(0.0002485505 4.277981e-5 0.0002496279 7.496202e-5 0.0002712547 4.963206e-5)
        meshes=example_auto2020_ankle_R_Geometry\calcn_r.obj
    Body toes_r: mass=0.01017376 mass_center=(-0.03644756 -0.109311 -0.06080556)
        inertia=(1.77281e-6 5.772084e-6 7.257975e-6 4.053347e-5 2.254723e-5 6.762209e-5)
        meshes=example_auto2020_ankle_R_Geometry\toes_r.obj
  JointSet:
    CustomJoint ground_tibia_r: socket_parent_frame=ground_offset socket_child_frame=tibia_r_offset
      Coordinate ground_tibia_r_rz: range=(-2.094395 2.094395)
      Coordinate ground_tibia_r_rx: range=(-2.094395 2.094395)
      Coordinate ground_tibia_r_ry: range=(-2.094395 2.094395)
      Coordinate ground_tibia_r_tx: range=(-10 10)
      Coordinate ground_tibia_r_ty: range=(-10 10)
      Coordinate ground_tibia_r_tz: range=(-10 10)
      PhysicalOffsetFrame ground_offset: socket_parent=/ground translation=(0 0 0) [meters]
      PhysicalOffsetFrame tibia_r_offset: socket_parent=/bodyset/tibia_r
          translation=(-0.05973765 0.01333547 0.03687372) orientation=(1.79414 -1.459244 0.25613) [radians]
      SpatialTransform:
        TransformAxis rotation1: coordinates=ground_tibia_r_rz axis=(0 0 1) LinearFunction(coefficients=1 0)
        TransformAxis rotation2: coordinates=ground_tibia_r_rx axis=(1 0 0) LinearFunction(coefficients=1 0)
        TransformAxis rotation3: coordinates=ground_tibia_r_ry axis=(0 1 0) LinearFunction(coefficients=1 0)
        TransformAxis translation1: coordinates=ground_tibia_r_tx axis=(1 0 0) LinearFunction(coefficients=1 0)
        TransformAxis translation2: coordinates=ground_tibia_r_ty axis=(0 1 0) LinearFunction(coefficients=1 0)
        TransformAxis translation3: coordinates=ground_tibia_r_tz axis=(0 0 1) LinearFunction(coefficients=1 0)
    CustomJoint ankle_r: socket_parent_frame=tibia_r_offset socket_child_frame=talus_r_offset
      Coordinate ankle_angle_r: range=(-1.570796 1.570796)
      PhysicalOffsetFrame tibia_r_offset: socket_parent=/bodyset/tibia_r
          translation=(-0.05686675 0.01205652 -0.008204123) orientation=(-1.462287 -1.313636 -3.013482)
      PhysicalOffsetFrame talus_r_offset: socket_parent=/bodyset/talus_r
          translation=(-0.05686675 0.01205652 -0.008204123) orientation=(-1.462287 -1.313636 2.99057)
      SpatialTransform: axes_held_at_zero=(rotation2 rotation3 translation1 translation2 translation3)
        TransformAxis rotation1: coordinates=ankle_angle_r axis=(0 0 1) LinearFunction(coefficients=1 0)
    CustomJoint subtalar_r: socket_parent_frame=talus_r_offset socket_child_frame=calcn_r_offset
      Coordinate subtalar_angle_r: range=(-1.570796 1.570796)
      PhysicalOffsetFrame talus_r_offset: socket_parent=/bodyset/talus_r
          translation=(-0.05887934 0.02555441 -0.02567964) orientation=(1.134633 0.1590373 0.05413611)
      PhysicalOffsetFrame calcn_r_offset: socket_parent=/bodyset/calcn_r
          translation=(-0.05887934 0.02555441 -0.02567964) orientation=(1.134633 0.1590373 0.05413611)
      SpatialTransform: axes_held_at_zero=(rotation2 rotation3 translation1 translation2 translation3)
        TransformAxis rotation1: coordinates=subtalar_angle_r axis=(0 0 1) LinearFunction(coefficients=1 0)
    CustomJoint toes_r: socket_parent_frame=calcn_r_offset socket_child_frame=toes_r_offset
      Coordinate mtp_angle_r: range=(-1.570796 1.570796)
      PhysicalOffsetFrame calcn_r_offset: socket_parent=/bodyset/calcn_r
          translation=(-0.0480416 -0.0797488 -0.06234515) orientation=(-2.526655 -1.397106 1.676373)
      PhysicalOffsetFrame toes_r_offset: socket_parent=/bodyset/toes_r translation=(-0.0480416 -0.0797488 -0.06234515)
          orientation=(-2.526655 -1.397106 1.676373)
      SpatialTransform: axes_held_at_zero=(rotation2 rotation3 translation1 translation2 translation3)
        TransformAxis rotation1: coordinates=mtp_angle_r axis=(0 0 1) LinearFunction(coefficients=1 0)
  MarkerSet:
    Marker RHEE: calcn_r (-0.0616889 0.0610677 -0.0367646)
    Marker RD5M: calcn_r (-0.0845974 -0.0753934 -0.0685117)
    Marker RD1M: calcn_r (-0.0114858 -0.0841042 -0.0561786)
    Marker R1MGROUND: calcn_r (-0.0114858 -0.0841042 -0.0561786)
    Marker R5MGROUND: calcn_r (-0.0846325 -0.074955 -0.0679743)
    Marker RHEEGROUND: calcn_r (-0.0458235 0.0437929 -0.0566339)
