# OpenSim document version 40000
Model auto_TLEM2_MRI_R:
  gravity: 0 -9.8081 0
  credits:
    Luca Modenese, Jean-Baptiste Renault 2020. Model created using the STAPLE (Shared Tools for Automatic Personalised Lower Extremity) modelling toolbox. GitHub page: https://github.com/modenaxe/msk-STAPLE.
  Ground
  BodySet:
    Body pelvis: mass=11.777 [kg] mass_center=(0.005113203 0.04337665 0.9235598) inertia=(0.1028 0.0871 0.0579 0 0 0)
        meshes=auto_TLEM2_MRI_R_Geometry\pelvis_no_sacrum.obj
    Body femur_r: mass=5.555876 mass_center=(-0.06849596 0.0312585 0.7219633)
        inertia=(0.07998062 0.02096579 0.08434103 0 0 0) meshes=auto_TLEM2_MRI_R_Geometry\femur_r.obj
    Body tibia_r: mass=2.214549 mass_center=(-0.04662725 0.03781867 0.3559335)
        inertia=(0.03010473 0.003046312 0.03052285 0 0 0) meshes=auto_TLEM2_MRI_R_Geometry\tibia_r.obj
    Body talus_r: mass=0.05973161 mass_center=(-0.03299865 0.0290193 0.1458489)
        inertia=(0.0005973161 0.0005973161 0.0005973161 0 0 0) meshes=auto_TLEM2_MRI_R_Geometry\talus_r.obj
    Body calcn_r: mass=0.7466451 mass_center=(-0.02998857 0.004372109 0.09741696)
        inertia=(0.0008362425 0.002329533 0.002448996 0 0 0) meshes=auto_TLEM2_MRI_R_Geometry\calcn_r.obj
    Body femur_l: mass=5.555876 mass_center=(0.08336642 0.03426863 0.7170824)
        inertia=(0.07998062 0.02096579 0.08434103 0 0 0) meshes=auto_TLEM2_MRI_L_Geometry\femur_l.obj
    Body tibia_l: mass=2.214549 mass_center=(0.07379292 0.03627656 0.3484344)
        inertia=(0.03010473 0.003046312 0.03052285 0 0 0) meshes=auto_TLEM2_MRI_L_Geometry\tibia_l.obj
    Body talus_l: mass=0.05973161 mass_center=(0.06480605 0.01989117 0.1377714)
        inertia=(0.0005973161 0.0005973161 0.0005973161 0 0 0) meshes=auto_TLEM2_MRI_L_Geometry\talus_l.obj
    Body calcn_l: mass=0.7466451 mass_center=(0.05614387 -0.004192622 0.08757482)
        inertia=(0.0008362425 0.002329533 0.002448996 0 0 0) meshes=auto_TLEM2_MRI_L_Geometry\calcn_l.obj
  JointSet:
    CustomJoint ground_pelvis: socket_parent_frame=ground_offset socket_child_frame=pelvis_offset
      Coordinate pelvis_tilt: range=(-1.570796 1.570796)
      Coordinate pelvis_list: range=(-1.570796 1.570796)
      Coordinate pelvis_rotation: range=(-1.570796 1.570796)
      Coordinate pelvis_tx: range=(-10 10)
      Coordinate pelvis_ty: range=(-10 10)
      Coordinate pelvis_tz: range=(-10 10)
      PhysicalOffsetFrame ground_offset: socket_parent=/ground translation=(0 0 0) [meters]
      PhysicalOffsetFrame pelvis_offset: socket_parent=/bodyset/pelvis translation=(0.009127548 -0.0169623 0.9617238)
          orientation=(0.5847164 -1.538379 -1.045824) [radians]
      SpatialTransform:
        TransformAxis rotation1: coordinates=pelvis_tilt axis=(0 0 1) LinearFunction(coefficients=1 0)
        TransformAxis rotation2: coordinates=pelvis_list axis=(1 0 0) LinearFunction(coefficients=1 0)
        TransformAxis rotation3: coordinates=pelvis_rotation axis=(0 1 0) LinearFunction(coefficients=1 0)
        TransformAxis translation1: coordinates=pelvis_tx axis=(1 0 0) LinearFunction(coefficients=1 0)
        TransformAxis translation2: coordinates=pelvis_ty axis=(0 1 0) LinearFunction(coefficients=1 0)
        TransformAxis translation3: coordinates=pelvis_tz axis=(0 0 1) LinearFunction(coefficients=1 0)
    CustomJoint hip_r: socket_parent_frame=pelvis_offset socket_child_frame=femur_r_offset
      Coordinate hip_flexion_r: range=(-2.094395 2.094395)
      Coordinate hip_adduction_r: range=(-2.094395 2.094395)
      Coordinate hip_rotation_r: range=(-2.094395 2.094395)
      PhysicalOffsetFrame pelvis_offset: socket_parent=/bodyset/pelvis translation=(-0.07831549 0.02245499 0.8807812)
          orientation=(0.5847164 -1.538379 -1.045824)
      PhysicalOffsetFrame femur_r_offset: socket_parent=/bodyset/femur_r translation=(-0.07831549 0.02245499 0.8807812)
          orientation=(-1.689983 -1.229271 2.956567)
      SpatialTransform: axes_held_at_zero=(translation1 translation2 translation3)
        TransformAxis rotation1: coordinates=hip_flexion_r axis=(0 0 1) LinearFunction(coefficients=1 0)
        TransformAxis rotation2: coordinates=hip_adduction_r axis=(1 0 0) LinearFunction(coefficients=1 0)
        TransformAxis rotation3: coordinates=hip_rotation_r axis=(0 1 0) LinearFunction(coefficients=1 0)
    CustomJoint knee_r: socket_parent_frame=femur_r_offset socket_child_frame=tibia_r_offset
      Coordinate knee_angle_r: range=(-2.094395 0.1745329)
      PhysicalOffsetFrame femur_r_offset: socket_parent=/bodyset/femur_r translation=(-0.05563759 0.04278641 0.5139961)
          orientation=(-1.619252 -1.232875 3.023259)
      PhysicalOffsetFrame tibia_r_offset: socket_parent=/bodyset/tibia_r translation=(-0.05563759 0.04278641 0.5139961)
          orientation=(-1.619252 -1.232875 3.106639)
      SpatialTransform: axes_held_at_zero=(rotation2 rotation3 translation1 translation2 translation3)
        TransformAxis rotation1: coordinates=knee_angle_r axis=(0 0 1) LinearFunction(coefficients=1 0)
    CustomJoint ankle_r: socket_parent_frame=tibia_r_offset socket_child_frame=talus_r_offset
      Coordinate ankle_angle_r: range=(-1.570796 1.570796)
      PhysicalOffsetFrame tibia_r_offset: socket_parent=/bodyset/tibia_r translation=(-0.03482848 0.03131357 0.1489556)
          orientation=(-1.598834 -0.939517 3.110705)
      PhysicalOffsetFrame talus_r_offset: socket_parent=/bodyset/talus_r translation=(-0.03482848 0.03131357 0.1489556)
          orientation=(-1.598834 -0.939517 2.384549)
      SpatialTransform: axes_held_at_zero=(rotation2 rotation3 translation1 translation2 translation3)
        TransformAxis rotation1: coordinates=ankle_angle_r axis=(0 0 1) LinearFunction(coefficients=1 0)
    CustomJoint subtalar_r: socket_parent_frame=talus_r_offset socket_child_frame=calcn_r_offset
      Coordinate subtalar_angle_r: range=(-1.570796 1.570796)
      PhysicalOffsetFrame talus_r_offset: socket_parent=/bodyset/talus_r translation=(-0.0238791 0.05474895 0.1366991)
          orientation=(1.608996 -0.2606986 0.08277742)
      PhysicalOffsetFrame calcn_r_offset: socket_parent=/bodyset/calcn_r translation=(-0.0238791 0.05474895 0.1366991)
          orientation=(1.608996 -0.2606986 0.08277742)
      SpatialTransform: axes_held_at_zero=(rotation2 rotation3 translation1 translation2 translation3)
        TransformAxis rotation1: coordinates=subtalar_angle_r axis=(0 0 1) LinearFunction(coefficients=1 0)
    CustomJoint hip_l: socket_parent_frame=pelvis_offset socket_child_frame=femur_l_offset
      Coordinate hip_flexion_l: range=(-2.094395 2.094395)
      Coordinate hip_adduction_l: range=(-2.094395 2.094395)
      Coordinate hip_rotation_l: range=(-2.094395 2.094395)
      PhysicalOffsetFrame pelvis_offset: socket_parent=/bodyset/pelvis translation=(0.08722079 0.0243331 0.8767903)
          orientation=(0.5847164 -1.538379 -1.045824)
      PhysicalOffsetFrame femur_l_offset: socket_parent=/bodyset/femur_l translation=(0.08722079 0.0243331 0.8767903)
          orientation=(1.526761 -1.347284 -0.1088533)
      SpatialTransform: axes_held_at_zero=(translation1 translation2 translation3)
        TransformAxis rotation1: coordinates=hip_flexion_l axis=(0 0 1) LinearFunction(coefficients=1 0)
        TransformAxis rotation2: coordinates=hip_adduction_l axis=(1 0 0) LinearFunction(coefficients=1 0)
        TransformAxis rotation3: coordinates=hip_rotation_l axis=(0 1 0) LinearFunction(coefficients=1 0)
    CustomJoint knee_l: socket_parent_frame=femur_l_offset socket_child_frame=tibia_l_offset
      Coordinate knee_angle_l: range=(-2.094395 0.1745329)
      PhysicalOffsetFrame femur_l_offset: socket_parent=/bodyset/femur_l translation=(0.07831924 0.04727889 0.5079499)
          orientation=(1.584253 -1.348315 -0.0527842)
      PhysicalOffsetFrame tibia_l_offset: socket_parent=/bodyset/tibia_l translation=(0.07831924 0.04727889 0.5079499)
          orientation=(1.584253 -1.348315 0.07407032)
      SpatialTransform: axes_held_at_zero=(rotation2 rotation3 translation1 translation2 translation3)
        TransformAxis rotation1: coordinates=knee_angle_l axis=(0 0 1) LinearFunction(coefficients=1 0)
    CustomJoint ankle_l: socket_parent_frame=tibia_l_offset socket_child_frame=talus_l_offset
      Coordinate ankle_angle_l: range=(-1.570796 1.570796)
      PhysicalOffsetFrame tibia_l_offset: socket_parent=/bodyset/tibia_l translation=(0.06786583 0.02186936 0.1395537)
          orientation=(1.594954 -1.149745 0.07339076)
      PhysicalOffsetFrame talus_l_offset: socket_parent=/bodyset/talus_l translation=(0.06786583 0.02186936 0.1395537)
          orientation=(1.594954 -1.149745 -0.6865176)
      SpatialTransform: axes_held_at_zero=(rotation2 rotation3 translation1 translation2 translation3)
        TransformAxis rotation1: coordinates=ankle_angle_l axis=(0 0 1) LinearFunction(coefficients=1 0)
    CustomJoint subtalar_l: socket_parent_frame=talus_l_offset socket_child_frame=calcn_l_offset
      Coordinate subtalar_angle_l: range=(-1.570796 1.570796)
      PhysicalOffsetFrame talus_l_offset: socket_parent=/bodyset/talus_l translation=(0.0627494 0.03453354 0.1339447)
          orientation=(1.854019 -0.05776225 -0.02475612)
      PhysicalOffsetFrame calcn_l_offset: socket_parent=/bodyset/calcn_l translation=(0.0627494 0.03453354 0.1339447)
          orientation=(1.854019 -0.05776225 -0.02475612)
      SpatialTransform: axes_held_at_zero=(rotation2 rotation3 translation1 translation2 translation3)
        TransformAxis rotation1: coordinates=subtalar_angle_l axis=(0 0 1) LinearFunction(coefficients=1 0)
  MarkerSet:
    Marker RASI: pelvis (-0.1090713 -0.019078 0.9649201)
    Marker LASI: pelvis (0.1273264 -0.0148466 0.9585276)
    Marker RPSI: pelvis (-0.0351645 0.1114914 0.9709551)
    Marker LPSI: pelvis (0.0450907 0.112634 0.9681029)
    Marker SYMP: pelvis (-0.002278999 -0.0284564 0.8748563)
    Marker RKNE: femur_r (-0.098325 0.0543845 0.5142749)
    Marker RMFC: femur_r (-0.0186391 0.026768 0.5260254)
    Marker RTRO: femur_r (-0.1450655 0.0480516 0.8502398)
    Marker RTTB: tibia_r (-0.0767861 0.0110318 0.4307253)
    Marker RHFB: tibia_r (-0.09517329 0.0720592 0.4606933)
    Marker RANK: tibia_r (-0.0535719 0.0596432 0.1496309)
    Marker RMMA: tibia_r (-0.006142799 0.0192145 0.1664906)
    Marker RLM: tibia_r (-0.0427066 0.0648861 0.1455124)
    Marker RHEE: calcn_r (-0.008973999 0.0835587 0.1540598)
    Marker RD5M: calcn_r (-0.0464526 0.0055018 0.0314011)
    Marker RD1M: calcn_r (-0.0038447 -0.0506405 0.0603556)
    Marker R1MGROUND: calcn_r (-0.000141098 -0.0496543 0.0555566)
    Marker R5MGROUND: calcn_r (-0.0382808 0.004453799 0.0272735)
    Marker RHEEGROUND: calcn_r (0.0096008 0.0753966 0.1276412)
    Marker LKNE: femur_l (0.1208191 0.0566457 0.5089534)
    Marker LMFC: femur_l (0.0401284 0.0347427 0.514724)
    Marker LTRO: femur_l (0.1551843 0.0469267 0.841665)
    Marker LTTB: tibia_l (0.09883241 0.0151805 0.4380884)
    Marker LHFB: tibia_l (0.1228714 0.0690725 0.4550079)
    Marker LANK: tibia_l (0.0917483 0.0456679 0.140306)
    Marker LMMA: tibia_l (0.0359538 0.0180103 0.1574936)
    Marker LHEE: calcn_l (0.0575768 0.0783699 0.1451513)
    Marker LD5M: calcn_l (0.0770305 -0.0131717 0.022223)
    Marker LD1M: calcn_l (0.0118133 -0.0473375 0.0489688)
    Marker L1MGROUND: calcn_l (0.0109261 -0.0443275 0.0490252)
    Marker L5MGROUND: calcn_l (0.0729901 -0.0090762 0.0215166)
    Marker LHEEGROUND: calcn_l (0.0356515 0.0794129 0.1208603)
