# OpenSim document version 30000
Model model for mass verification:
  credits: created with NMSBuilder by Luca Modenese (2020)
  length_units: meters
  force_units: N
  gravity: 0 -9.80665 0
  BodySet:
    Body ground: mass=0 mass_center=(0 0 0) inertia_xx=1 inertia_yy=1 inertia_zz=1
    Body calcn_r: mass=0.1314373 mass_center=(-0.0558301 -0.0102154 -0.0369649) inertia_xx=0.0002485505
        inertia_yy=4.277981e-5 inertia_zz=0.0002496279 inertia_xy=-2.182357e-5 inertia_xz=1.092329e-6
        inertia_yz=2.530097e-5 meshes=ATTACH_muscles_leftnewOsimFile_Geometries\calcn_r.vtp
    Body tibia_r: mass=0.07442177 mass_center=(-0.0597377 0.0133355 0.0368737) inertia_xx=5.523111e-5
        inertia_yy=5.961233e-5 inertia_zz=1.507759e-5 inertia_xy=-3.470729e-6 inertia_xz=-2.46706e-7
        inertia_yz=5.639473e-7 meshes=ATTACH_muscles_leftnewOsimFile_Geometries\tibia_r.vtp
    Body talus_r: mass=0.03059041 mass_center=(-0.0557269 0.0060928 -0.00589845) inertia_xx=5.636354e-6
        inertia_yy=3.26802e-6 inertia_zz=6.370899e-6 inertia_xy=-2.48011e-7 inertia_xz=-9.913482e-8
        inertia_yz=8.466046e-7 meshes=ATTACH_muscles_leftnewOsimFile_Geometries\talus_r.vtp
