# OpenSim document version 40000
Model JIA_ANKLE_MRI_L_auto:
  gravity: 0 -9.8081 0
  credits:
    Luca Modenese, Jean-Baptiste Renault 2020. Model created using the STAPLE (Shared Tools for Automatic Personalised Lower Extremity) modelling toolbox. GitHub page: https://github.com/modenaxe/msk-STAPLE.
  Ground
  BodySet:
    Body tibia_l: mass=0.07071989 [kg] mass_center=(0.07569748 0.009310386 0.0359297)
        inertia=(5.018106e-5 5.236546e-5 1.441687e-5 4.984145e-5 0.0001923431 2.365717e-5)
        meshes=example_auto2020_ankle_L_Geometry\tibia_l.obj
    Body talus_l: mass=0.03190938 mass_center=(0.07674717 0.001461037 -0.006398506)
        inertia=(6.038095e-6 3.463729e-6 6.764073e-6 3.578015e-6 -1.566965e-5 -2.983035e-7)
        meshes=example_auto2020_ankle_L_Geometry\talus_l.obj
    Body calcn_l: mass=0.1301892 mass_center=(0.0790226 -0.01537232 -0.03661017)
        inertia=(0.0002521251 3.87307e-5 0.000251312 -0.0001581487 -0.0003766414 7.326828e-5)
        meshes=example_auto2020_ankle_L_Geometry\calcn_l.obj
    Body toes_l: mass=0.009960326 mass_center=(0.06151706 -0.1164463 -0.05932984)
        inertia=(1.850768e-6 5.783755e-6 7.229248e-6 -7.135014e-5 -3.635317e-5 6.881332e-5)
        meshes=example_auto2020_ankle_L_Geometry\toes_l.obj
  JointSet:
    CustomJoint ground_tibia_l: socket_parent_frame=ground_offset socket_child_frame=tibia_l_offset
      Coordinate ground_tibia_l_rz: range=(-2.094395 2.094395)
      Coordinate ground_tibia_l_rx: range=(-2.094395 2.094395)
      Coordinate ground_tibia_l_ry: range=(-2.094395 2.094395)
      Coordinate ground_tibia_l_tx: range=(-10 10)
      Coordinate ground_tibia_l_ty: range=(-10 10)
      Coordinate ground_tibia_l_tz: range=(-10 10)
      PhysicalOffsetFrame ground_offset: socket_parent=/ground translation=(0 0 0) [meters]
      PhysicalOffsetFrame tibia_l_offset: socket_parent=/bodyset/tibia_l translation=(0.07569748 0.009310386 0.0359297)
          orientation=(-1.796602 -1.395283 2.961114) [radians]
      SpatialTransform:
        TransformAxis rotation1: coordinates=ground_tibia_l_rz axis=(0 0 1) LinearFunction(coefficients=1 0)
        TransformAxis rotation2: coordinates=ground_tibia_l_rx axis=(1 0 0) LinearFunction(coefficients=1 0)
        TransformAxis rotation3: coordinates=ground_tibia_l_ry axis=(0 1 0) LinearFunction(coefficients=1 0)
        TransformAxis translation1: coordinates=ground_tibia_l_tx axis=(1 0 0) LinearFunction(coefficients=1 0)
        TransformAxis translation2: coordinates=ground_tibia_l_ty axis=(0 1 0) LinearFunction(coefficients=1 0)
        TransformAxis translation3: coordinates=ground_tibia_l_tz axis=(0 0 1) LinearFunction(coefficients=1 0)
    CustomJoint ankle_l: socket_parent_frame=tibia_l_offset socket_child_frame=talus_l_offset
      Coordinate ankle_angle_l: range=(-1.570796 1.570796)
      PhysicalOffsetFrame tibia_l_offset: socket_parent=/bodyset/tibia_l
          translation=(0.07832146 0.007740191 -0.01265173) orientation=(1.857199 -0.9577554 0.2944995)
      PhysicalOffsetFrame talus_l_offset: socket_parent=/bodyset/talus_l
          translation=(0.07832146 0.007740191 -0.01265173) orientation=(1.857199 -0.9577554 0.03356369)
      SpatialTransform: axes_held_at_zero=(rotation2 rotation3 translation1 translation2 translation3)
        TransformAxis rotation1: coordinates=ankle_angle_l axis=(0 0 1) LinearFunction(coefficients=1 0)
    CustomJoint subtalar_l: socket_parent_frame=talus_l_offset socket_child_frame=calcn_l_offset
      Coordinate subtalar_angle_l: range=(-1.570796 1.570796)
      PhysicalOffsetFrame talus_l_offset: socket_parent=/bodyset/talus_l
          translation=(0.07957946 0.02297105 -0.02734866) orientation=(1.118533 -0.07545091 -2.980986)
      PhysicalOffsetFrame calcn_l_offset: socket_parent=/bodyset/calcn_l
          translation=(0.07957946 0.02297105 -0.02734866) orientation=(1.118533 -0.07545091 -2.980986)
      SpatialTransform: axes_held_at_zero=(rotation2 rotation3 translation1 translation2 translation3)
        TransformAxis rotation1: coordinates=subtalar_angle_l axis=(0 0 1) LinearFunction(coefficients=1 0)
    CustomJoint toes_l: socket_parent_frame=calcn_l_offset socket_child_frame=toes_l_offset
      Coordinate mtp_angle_l: range=(-1.570796 1.570796)
      PhysicalOffsetFrame calcn_l_offset: socket_parent=/bodyset/calcn_l translation=(0.07419975 -0.08544175 -0.061889)
          orientation=(0.6235319 -1.324567 -1.475762)
      PhysicalOffsetFrame toes_l_offset: socket_parent=/bodyset/toes_l translation=(0.07419975 -0.08544175 -0.061889)
          orientation=(0.6235319 -1.324567 -1.475762)
      SpatialTransform: axes_held_at_zero=(rotation2 rotation3 translation1 translation2 translation3)
        TransformAxis rotation1: coordinates=mtp_angle_l axis=(0 0 1) LinearFunction(coefficients=1 0)
  MarkerSet:
    Marker LHEE: calcn_l (0.0765231 0.0560369 -0.0348338)
    Marker LD5M: calcn_l (0.109795 -0.0793552 -0.0703513)
    Marker LD1M: calcn_l (0.0386045 -0.0915283 -0.0534267)
    Marker L1MGROUND: calcn_l (0.0386674 -0.0905498 -0.0533703)
    Marker L5MGROUND: calcn_l (0.1042 -0.0787992 -0.0737629)
    Marker LHEEGROUND: calcn_l (0.068489 0.0436848 -0.0553036)
