# OpenSim document version 40000
Model example_auto2020_hip_R:
  gravity: 0 -9.8081 0
  credits:
    Luca Modenese, Jean-Baptiste Renault 2020. Model created using the STAPLE (Shared Tools for Automatic Personalised Lower Extremity) modelling toolbox. GitHub page: https://github.com/modenaxe/msk-STAPLE.
  Ground
  BodySet:
    Body pelvis: mass=11.777 [kg] mass_center=(0.2401651 0.2562536 -0.3835137) inertia=(0.1028 0.0871 0.0579 0 0 0)
        meshes=example_auto2020_hip_R_Geometry\pelvis_no_sacrum.obj
    Body femur_r: mass=7.90169 mass_center=(0.1348547 0.2641698 -0.6047532)
        inertia=(0.1137502 0.02981802 0.1199517 0 0 0) meshes=example_auto2020_hip_R_Geometry\femur_r.obj
  JointSet:
    CustomJoint ground_pelvis: socket_parent_frame=ground_offset socket_child_frame=pelvis_offset
      Coordinate pelvis_tilt: range=(-1.570796 1.570796)
      Coordinate pelvis_list: range=(-1.570796 1.570796)
      Coordinate pelvis_rotation: range=(-1.570796 1.570796)
      Coordinate pelvis_tx: range=(-10 10)
      Coordinate pelvis_ty: range=(-10 10)
      Coordinate pelvis_tz: range=(-10 10)
      PhysicalOffsetFrame ground_offset: socket_parent=/ground translation=(0 0 0) [meters]
      PhysicalOffsetFrame pelvis_offset: socket_parent=/bodyset/pelvis translation=(0.2385359 0.1799338 -0.3576935)
          orientation=(0.6963622 -1.554062 -0.9762067) [radians]
      SpatialTransform:
        TransformAxis rotation1: coordinates=pelvis_tilt axis=(0 0 1) LinearFunction(coefficients=1 0)
        TransformAxis rotation2: coordinates=pelvis_list axis=(1 0 0) LinearFunction(coefficients=1 0)
        TransformAxis rotation3: coordinates=pelvis_rotation axis=(0 1 0) LinearFunction(coefficients=1 0)
        TransformAxis translation1: coordinates=pelvis_tx axis=(1 0 0) LinearFunction(coefficients=1 0)
        TransformAxis translation2: coordinates=pelvis_ty axis=(0 1 0) LinearFunction(coefficients=1 0)
        TransformAxis translation3: coordinates=pelvis_tz axis=(0 0 1) LinearFunction(coefficients=1 0)
    CustomJoint hip_r: socket_parent_frame=pelvis_offset socket_child_frame=femur_r_offset
      Coordinate hip_flexion_r: range=(-2.094395 2.094395)
      Coordinate hip_adduction_r: range=(-2.094395 2.094395)
      Coordinate hip_rotation_r: range=(-2.094395 2.094395)
      PhysicalOffsetFrame pelvis_offset: socket_parent=/bodyset/pelvis translation=(0.1437968 0.2434574 -0.4325847)
          orientation=(0.6963622 -1.554062 -0.9762067)
      PhysicalOffsetFrame femur_r_offset: socket_parent=/bodyset/femur_r translation=(0.1437968 0.2434574 -0.4325847)
          orientation=(-0.3626172 -1.512655 -2.052447)
      SpatialTransform: axes_held_at_zero=(translation1 translation2 translation3)
        TransformAxis rotation1: coordinates=hip_flexion_r axis=(0 0 1) LinearFunction(coefficients=1 0)
        TransformAxis rotation2: coordinates=hip_adduction_r axis=(1 0 0) LinearFunction(coefficients=1 0)
        TransformAxis rotation3: coordinates=hip_rotation_r axis=(0 1 0) LinearFunction(coefficients=1 0)
  MarkerSet:
    Marker RASI: pelvis (0.1186272 0.1786466 -0.3561539)
    Marker LASI: pelvis (0.3584447 0.181221 -0.359233)
    Marker RPSI: pelvis (0.1991241 0.3212036 -0.3433098)
    Marker LPSI: pelvis (0.2806929 0.3235507 -0.34304)
    Marker SYMP: pelvis (0.243846 0.1891511 -0.4575993)
    Marker RKNE: femur_r (0.08280264 0.291409 -0.822748)
    Marker RMFC: femur_r (0.1647082 0.2890858 -0.8217935)
    Marker RTRO: femur_r (0.07942261 0.2640768 -0.4510891)
