# OpenSim document version 40000
Model example_auto2020_knee_R:
  gravity: 0 -9.8081 0
  credits:
    Luca Modenese, Jean-Baptiste Renault 2020. Model created using the STAPLE (Shared Tools for Automatic Personalised Lower Extremity) modelling toolbox. GitHub page: https://github.com/modenaxe/msk-STAPLE.
  Ground
  BodySet:
    Body femur_r: mass=9.3014 [kg] mass_center=(0.07422009 -0.02734397 -0.1668766) inertia=(0.1339 0.0351 0.1412 0 0 0)
        meshes=example_auto2020_knee_R_Geometry\femur_r.obj
    Body tibia_r: mass=4.281462 mass_center=(0.06785537 -0.02472826 -0.5910366)
        inertia=(0.05820248 0.005889536 0.05901084 0 0 0)
        meshes=(example_auto2020_knee_R_Geometry\tibia_r.obj example_auto2020_knee_R_Geometry\patella_r.obj)
  JointSet:
    CustomJoint ground_femur_r: socket_parent_frame=ground_offset socket_child_frame=femur_r_offset
      Coordinate ground_femur_r_rz: range=(-2.094395 2.094395)
      Coordinate ground_femur_r_rx: range=(-2.094395 2.094395)
      Coordinate ground_femur_r_ry: range=(-2.094395 2.094395)
      Coordinate ground_femur_r_tx: range=(-10 10)
      Coordinate ground_femur_r_ty: range=(-10 10)
      Coordinate ground_femur_r_tz: range=(-10 10)
      PhysicalOffsetFrame ground_offset: socket_parent=/ground translation=(0 0 0) [meters]
      PhysicalOffsetFrame femur_r_offset: socket_parent=/bodyset/femur_r
          translation=(0.08023619 -0.02664457 0.01836867) orientation=(-2.357085 1.524768 -2.35855) [radians]
      SpatialTransform:
        TransformAxis rotation1: coordinates=ground_femur_r_rz axis=(0 0 1) LinearFunction(coefficients=1 0)
        TransformAxis rotation2: coordinates=ground_femur_r_rx axis=(1 0 0) LinearFunction(coefficients=1 0)
        TransformAxis rotation3: coordinates=ground_femur_r_ry axis=(0 1 0) LinearFunction(coefficients=1 0)
        TransformAxis translation1: coordinates=ground_femur_r_tx axis=(1 0 0) LinearFunction(coefficients=1 0)
        TransformAxis translation2: coordinates=ground_femur_r_ty axis=(0 1 0) LinearFunction(coefficients=1 0)
        TransformAxis translation3: coordinates=ground_femur_r_tz axis=(0 0 1) LinearFunction(coefficients=1 0)
    CustomJoint knee_r: socket_parent_frame=femur_r_offset socket_child_frame=tibia_r_offset
      Coordinate knee_angle_r: range=(-2.094395 0.1745329)
      PhysicalOffsetFrame femur_r_offset: socket_parent=/bodyset/femur_r translation=(0.0663422 -0.02825982 -0.4094494)
          orientation=(-1.532135 1.53815 3.100237)
      PhysicalOffsetFrame tibia_r_offset: socket_parent=/bodyset/tibia_r translation=(0.0663422 -0.02825982 -0.4094494)
          orientation=(-2.918522 1.513865 -1.83223)
      SpatialTransform: axes_held_at_zero=(rotation2 rotation3 translation1 translation2 translation3)
        TransformAxis rotation1: coordinates=knee_angle_r axis=(0 0 1) LinearFunction(coefficients=1 0)
  MarkerSet:
    Marker RKNE: femur_r (0.1110169 -0.02444907 -0.4109345)
    Marker RMFC: femur_r (0.02102521 -0.02654081 -0.4057618)
    Marker RTRO: femur_r (0.145391 -0.03525885 -0.0256909)
    Marker RTTB: tibia_r (0.07737318 0.0152341 -0.472258)
    Marker RHFB: tibia_r (0.1214198 -0.04558284 -0.4726215)
    Marker RANK: tibia_r (0.0849203 -0.04741333 -0.8244829)
    Marker RMMA: tibia_r (0.02415973 -0.01833925 -0.8129268)
    Marker RLM: tibia_r (0.07403276 -0.05401113 -0.839514)
