# OpenSim document version 30000
Model IGG-CSm6_R_MusDelp2007:
  length_units: meters
  force_units: N
  gravity: 0 -9.80665 0
  credits:
    Frank Anderson, Peter Loan, Ayman Habib, Ajay Seth, Michael Sherman
  BodySet:
    Body ground: mass=0 mass_center=(0 0 0) inertia_xx=1 inertia_yy=1 inertia_zz=1
    Body pelvis: mass=10.5745 mass_center=(0.00043727 -0.023844 -0.112826) inertia_xx=0.0695057 inertia_yy=0.0984264
        inertia_zz=0.0855027 inertia_xy=0.000160756 inertia_xz=0.00019673 inertia_yz=-0.0034701
        meshes=(Geometry\pelvis.vtp Geometry\pelvis_ST.vtp Geometry\pelvis_NegST.vtp)
      CustomJoint ground_pelvis: parent_body=ground location_in_parent=(0 0 0)
          location=(-0.00280573 -0.0961158 -0.128228) orientation=(-3.09393 -1.53251 1.40085)
        Coordinate pelvis_tilt: motion_type=rotational range=(-0.7853982 0.7853982)
        Coordinate pelvis_list: motion_type=rotational range=(-0.7853982 0.7853982)
        Coordinate pelvis_rotation: motion_type=rotational range=(-0.7853982 0.7853982)
        Coordinate pelvis_tx: motion_type=translational range=(-0.5 0.5)
        Coordinate pelvis_ty: motion_type=translational range=(-0.5 0.5)
        Coordinate pelvis_tz: motion_type=translational range=(-0.5 0.5)
        SpatialTransform:
          TransformAxis rotation1: coordinates=pelvis_tilt axis=(0 0 1) LinearFunction(coefficients=1 0)
          TransformAxis rotation2: coordinates=pelvis_list axis=(1 0 0) LinearFunction(coefficients=1 0)
          TransformAxis rotation3: coordinates=pelvis_rotation axis=(0 1 0) LinearFunction(coefficients=1 0)
          TransformAxis translation1: coordinates=pelvis_tx axis=(1 0 0) LinearFunction(coefficients=1 0)
          TransformAxis translation2: coordinates=pelvis_ty axis=(0 1 0) LinearFunction(coefficients=1 0)
          TransformAxis translation3: coordinates=pelvis_tz axis=(0 0 1) LinearFunction(coefficients=1 0)
    Body femur_r: mass=10.1806 mass_center=(-0.0862937 -0.0227124 -0.351573) inertia_xx=0.147908 inertia_yy=0.151004
        inertia_zz=0.0461958 inertia_xy=7.64e-5 inertia_xz=-0.0254333 inertia_yz=-0.00300842
        meshes=(Geometry\femur_r.vtp Geometry\femur_r_ST.vtp Geometry\femur_r_NegST.vtp)
      CustomJoint hip_r: parent_body=pelvis location_in_parent=(-0.083031 -0.0392821 -0.193028)
          orientation_in_parent=(-3.09393 -1.53251 1.40085) location=(-0.083031 -0.0392821 -0.193028)
          orientation=(1.9565 -1.31846 0.319387)
        Coordinate hip_flexion_r: motion_type=rotational range=(-0.6981317 1.919862)
        Coordinate hip_adduction_r: motion_type=rotational range=(-1.570796 1.570796)
        Coordinate hip_rotation_r: motion_type=rotational range=(-1.570796 1.570796)
        SpatialTransform: axes_held_at_zero=(translation1 translation2 translation3)
          TransformAxis rotation1: coordinates=hip_flexion_r axis=(0 0 1) LinearFunction(coefficients=1 0)
          TransformAxis rotation2: coordinates=hip_adduction_r axis=(1 0 0) LinearFunction(coefficients=1 0)
          TransformAxis rotation3: coordinates=hip_rotation_r axis=(0 1 0) LinearFunction(coefficients=1 0)
    Body tibia_r: mass=3.01077 mass_center=(-0.056696 0.00294438 -0.729274) inertia_xx=0.0290991 inertia_yy=0.0294589
        inertia_zz=0.00446262 inertia_xy=0.000209107 inertia_xz=-0.000369836 inertia_yz=-0.000169386
        meshes=(Geometry\patella_r.vtp Geometry\tibia_r.vtp Geometry\tibia_r_ST.vtp Geometry\tibia_r_NegST.vtp)
      CustomJoint knee_r: parent_body=femur_r location_in_parent=(-0.0524808 -0.00986589 -0.580428)
          orientation_in_parent=(1.48621 -1.32917 -0.137136) location=(-0.0524808 -0.00986589 -0.580428)
          orientation=(1.48621 -1.32917 -0.0720062)
        Coordinate knee_angle_r: motion_type=rotational range=(-2.094395 0.1745329)
        SpatialTransform: axes_held_at_zero=(rotation2 rotation3 translation1 translation2 translation3)
          TransformAxis rotation1: coordinates=knee_angle_r axis=(0 0 1) LinearFunction(coefficients=1 0)
    Body talus_r: mass=0.0585202 mass_center=(-0.0434277 -0.0197401 -0.951794) inertia_xx=1.69023e-5
        inertia_yy=9.13183e-6 inertia_zz=1.65582e-5 inertia_xy=-4.14458e-7 inertia_xz=-9.78703e-7 inertia_yz=3.39187e-6
        meshes=Geometry\talus_r.vtp
      CustomJoint ankle_r: parent_body=tibia_r location_in_parent=(-0.0459238 -0.0121816 -0.956864)
          orientation_in_parent=(-1.35773 -1.36541 -2.87772) location=(-0.0459238 -0.0121816 -0.956864)
          orientation=(-1.35773 -1.36541 3.13207)
        Coordinate ankle_angle_r: motion_type=rotational default_value=-0.07390547 range=(-0.8726646 0.5235988)
        SpatialTransform: axes_held_at_zero=(rotation2 rotation3 translation1 translation2 translation3)
          TransformAxis rotation1: coordinates=ankle_angle_r axis=(0 0 1) LinearFunction(coefficients=1 0)
    Body calcn_r: mass=0.788332 mass_center=(-0.0467549 -0.0432827 -0.994021) inertia_xx=0.00221291
        inertia_yy=0.000841095 inertia_zz=0.001917 inertia_xy=-0.000164079 inertia_xz=-3.25964e-5
        inertia_yz=0.000525675 meshes=(Geometry\calcn_r.vtp Geometry\calcn_r_ST.vtp Geometry\calcn_r_NegST.vtp)
      CustomJoint subtalar_r: parent_body=talus_r location_in_parent=(-0.0563872 0.000894385 -0.975453)
          orientation_in_parent=(1.07401 0.344128 0.198357) location=(-0.0563872 0.000894385 -0.975453)
          orientation=(1.07401 0.344128 0.198357)
        Coordinate subtalar_angle_r: motion_type=rotational default_value=-0.04894122 range=(-3.141593 3.141593)
        SpatialTransform: axes_held_at_zero=(rotation2 rotation3 translation1 translation2 translation3)
          TransformAxis rotation1: coordinates=subtalar_angle_r axis=(0 0 1) LinearFunction(coefficients=1 0)
    Body toes_r: mass=0.0792114 mass_center=(-0.0260143 -0.148562 -1.03548) inertia_xx=2.15401e-5 inertia_yy=4.06199e-5
        inertia_zz=4.80972e-5 inertia_xy=-8.55371e-6 inertia_xz=6.3997e-6 inertia_yz=2.40543e-6
        meshes=(Geometry\toes_r.vtp Geometry\toes_r_ST.vtp Geometry\toes_r_NegST.vtp)
      CustomJoint mtp_r: parent_body=calcn_r location_in_parent=(-0.0107563 -0.130218 -1.01702)
          orientation_in_parent=(-2.40513 -1.13928 2.10502) location=(-0.0107563 -0.130218 -1.01702)
          orientation=(-2.40513 -1.13928 2.10502)
        Coordinate mtp_angle_r: motion_type=rotational range=(-3.141593 3.141593)
        SpatialTransform: axes_held_at_zero=(rotation2 rotation3 translation1 translation2 translation3)
          TransformAxis rotation1: coordinates=mtp_angle_r axis=(0 0 1) LinearFunction(coefficients=1 0)
  ForceSet:
    Thelen2003Muscle [values shared by the 42 below unless stated]: min_control=0 max_control=1
        max_contraction_velocity=10
    Thelen2003Muscle add_brev_r: max_isometric_force=401.9672 optimal_fiber_length=0.1265144
        tendon_slack_length=0.01902472 pennation_angle_at_optimal=0 [radians]
      PathPoint add_brev_r orig: pelvis (-0.00744787 -0.0561923 -0.234742)
      PathPoint add_brev_r ins: femur_r (-0.0927619 -0.0301305 -0.315923)
    Thelen2003Muscle add_long_r: max_isometric_force=587.4905 optimal_fiber_length=0.1312863
        tendon_slack_length=0.1046485 pennation_angle_at_optimal=0.1047198
      PathPoint add_long_r orig: pelvis (-0.0196927 -0.0858325 -0.219177)
      PathPoint add_long_r ins: femur_r (-0.0758015 -0.0277885 -0.397648)
    Thelen2003Muscle add_mag1_r: max_isometric_force=356.9918 optimal_fiber_length=0.08291326
        tendon_slack_length=0.05718156 pennation_angle_at_optimal=0.08726646
      PathPoint add_mag1_r orig: pelvis (-0.022585 -0.0407249 -0.240062)
      PathPoint add_mag1_r ins: femur_r (-0.0887701 -0.0297211 -0.31737)
    Thelen2003Muscle add_mag2_r: max_isometric_force=321.3863 optimal_fiber_length=0.1164237
        tendon_slack_length=0.1154616 pennation_angle_at_optimal=0.05235988
      PathPoint add_mag2_r orig: pelvis (-0.0300735 -0.0343835 -0.24437)
      PathPoint add_mag2_r ins: femur_r (-0.0710587 -0.0274282 -0.419806)
    Thelen2003Muscle add_mag3_r: max_isometric_force=457.2494 optimal_fiber_length=0.1200295
        tendon_slack_length=0.2281477 pennation_angle_at_optimal=0.08726646
      PathPoint add_mag3_r orig: pelvis (-0.0401951 -0.0103492 -0.246866)
      PathPoint add_mag3_r ins: femur_r (-0.0210535 -0.0167008 -0.557959)
    Thelen2003Muscle bifemlh_r: max_isometric_force=839.5398 optimal_fiber_length=0.1011022
        tendon_slack_length=0.3023789 pennation_angle_at_optimal=0
      PathPoint bifemlh_r orig: pelvis (-0.0520687 0.00170655 -0.242515)
      PathPoint bifemlh_r via 1: tibia_r (-0.0961447 0.00315689 -0.617301)
      PathPoint bifemlh_r ins: tibia_r (-0.0925568 0.00117686 -0.639179)
    Thelen2003Muscle bifemsh_r: max_isometric_force=753.3371 optimal_fiber_length=0.171516
        tendon_slack_length=0.08823658 pennation_angle_at_optimal=0.4014257
      PathPoint bifemsh_r orig: femur_r (-0.0859282 -0.0408177 -0.401515)
      PathPoint bifemsh_r via 1: tibia_r (-0.0944778 0.00735956 -0.619166)
      PathPoint bifemsh_r ins: tibia_r (-0.095126 -0.00550031 -0.637919)
    Thelen2003Muscle ext_dig_r: max_isometric_force=479.737 optimal_fiber_length=0.08762818
        tendon_slack_length=0.2963894 pennation_angle_at_optimal=0.1396263
      PathPoint ext_dig_r orig: tibia_r (-0.0794288 -0.0016953 -0.730774)
      PathPoint ext_dig_r via 1: tibia_r (-0.0589973 -0.0419031 -0.934776)
      PathPoint ext_dig_r via 2: calcn_r (-0.0551838 -0.0670036 -0.977329)
      PathPoint ext_dig_r via 3: calcn_r (-0.0428244 -0.128514 -1.03414)
      PathPoint ext_dig_r via 4: toes_r (-0.0419326 -0.146786 -1.03594)
      PathPoint ext_dig_r via 5: toes_r (-0.0400148 -0.158102 -1.03998)
      PathPoint ext_dig_r ins: toes_r (-0.0393277 -0.157502 -1.04008)
    Thelen2003Muscle ext_hal_r: max_isometric_force=151.7918 optimal_fiber_length=0.09786876
        tendon_slack_length=0.2689187 pennation_angle_at_optimal=0.1047198
      PathPoint ext_hal_r orig: tibia_r (-0.0742916 0.00276156 -0.778221)
      PathPoint ext_hal_r via 1: tibia_r (-0.0490202 -0.0439506 -0.93335)
      PathPoint ext_hal_r via 2: calcn_r (-0.0256807 -0.0892321 -0.982181)
      PathPoint ext_hal_r via 3: calcn_r (-0.00774609 -0.135698 -1.01441)
      PathPoint ext_hal_r via 4: calcn_r (-0.00392099 -0.180281 -1.03453)
      PathPoint ext_hal_r via 5: toes_r (-0.0074479 -0.135779 -1.01375)
      PathPoint ext_hal_r ins: toes_r (-0.00763631 -0.174935 -1.03338)
    Thelen2003Muscle flex_dig_r: max_isometric_force=290.4658 optimal_fiber_length=0.02818913
        tendon_slack_length=0.3316368 pennation_angle_at_optimal=0.1221731
      PathPoint flex_dig_r orig: tibia_r (-0.0516803 -0.0119118 -0.790267)
      PathPoint flex_dig_r via 1: tibia_r (-0.0403811 0.00251809 -0.961823)
      PathPoint flex_dig_r via 2: calcn_r (-0.0339345 -0.00857892 -0.96456)
      PathPoint flex_dig_r via 3: calcn_r (-0.0250637 -0.0285057 -0.980354)
      PathPoint flex_dig_r via 4: calcn_r (-0.0388426 -0.130258 -1.0394)
      PathPoint flex_dig_r via 5: toes_r (-0.0384391 -0.142994 -1.03757)
      PathPoint flex_dig_r via 6: toes_r (-0.0356632 -0.155664 -1.04332)
      PathPoint flex_dig_r ins: toes_r (-0.0395713 -0.157591 -1.04387)
    Thelen2003Muscle flex_hal_r: max_isometric_force=301.7096 optimal_fiber_length=0.03728143
        tendon_slack_length=0.3294638 pennation_angle_at_optimal=0.1745329
      PathPoint flex_hal_r orig: tibia_r (-0.0767544 0.00345396 -0.807813)
      PathPoint flex_hal_r via 1: tibia_r (-0.0421531 0.00473654 -0.965773)
      PathPoint flex_hal_r via 2: calcn_r (-0.0317904 0.00185066 -0.966336)
      PathPoint flex_hal_r via 3: calcn_r (-0.0164837 -0.0603356 -0.995938)
      PathPoint flex_hal_r via 4: calcn_r (-0.00472122 -0.130165 -1.03223)
      PathPoint flex_hal_r via 5: toes_r (-0.00326736 -0.17667 -1.03776)
      PathPoint flex_hal_r ins: toes_r (-0.00441493 -0.171882 -1.03535)
    Thelen2003Muscle gem_r: max_isometric_force=153.6658 optimal_fiber_length=0.02593523 tendon_slack_length=0.04214475
        pennation_angle_at_optimal=0
      PathPoint gem_r orig: pelvis (-0.0625725 -0.000629548 -0.227866)
      PathPoint gem_r ins: femur_r (-0.119945 -0.0349835 -0.205336)
    Thelen2003Muscle glut_max1_r: max_isometric_force=536.8932 optimal_fiber_length=0.1299455
        tendon_slack_length=0.1143886 pennation_angle_at_optimal=0.08726646
      PathPoint glut_max1_r orig: pelvis (-0.0540537 0.0242435 -0.0907391)
      PathPoint glut_max1_r via 1: pelvis (-0.108951 0.0134842 -0.167584)
      PathPoint glut_max1_r ins: femur_r (-0.114326 -0.0259182 -0.259428)
    Thelen2003Muscle glut_max2_r: max_isometric_force=767.3918 optimal_fiber_length=0.1410186
        tendon_slack_length=0.1218324 pennation_angle_at_optimal=0
      PathPoint glut_max2_r orig: pelvis (-0.0505902 0.0174726 -0.117657)
      PathPoint glut_max2_r via 1: pelvis (-0.111329 0.0277451 -0.226683)
      PathPoint glut_max2_r ins: femur_r (-0.100801 -0.0300732 -0.299048)
    Thelen2003Muscle glut_max3_r: max_isometric_force=517.2165 optimal_fiber_length=0.1215125
        tendon_slack_length=0.1223563 pennation_angle_at_optimal=0.08726646
      PathPoint glut_max3_r orig: pelvis (-0.00796401 0.0435178 -0.168801)
      PathPoint glut_max3_r via 1: pelvis (-0.0617372 0.0278859 -0.249067)
      PathPoint glut_max3_r ins: femur_r (-0.0963643 -0.0345081 -0.33566)
    Thelen2003Muscle glut_med1_r: max_isometric_force=767.3918 optimal_fiber_length=0.04696978
        tendon_slack_length=0.06847931 pennation_angle_at_optimal=0.1396263
      PathPoint glut_med1_r orig: pelvis (-0.111722 -0.0746869 -0.120336)
      PathPoint glut_med1_r ins: femur_r (-0.130686 -0.0331851 -0.216321)
    Thelen2003Muscle glut_med2_r: max_isometric_force=536.8932 optimal_fiber_length=0.07434223
        tendon_slack_length=0.04662886 pennation_angle_at_optimal=0
      PathPoint glut_med2_r orig: pelvis (-0.0759376 -0.0313179 -0.101049)
      PathPoint glut_med2_r ins: femur_r (-0.123422 -0.0304606 -0.215195)
    Thelen2003Muscle glut_med3_r: max_isometric_force=611.8521 optimal_fiber_length=0.0661278
        tendon_slack_length=0.05425346 pennation_angle_at_optimal=0.3316126
      PathPoint glut_med3_r orig: pelvis (-0.0530378 0.0160467 -0.121133)
      PathPoint glut_med3_r ins: femur_r (-0.122156 -0.0278211 -0.21064)
    Thelen2003Muscle glut_min1_r: max_isometric_force=252.9863 optimal_fiber_length=0.06291591
        tendon_slack_length=0.01480374 pennation_angle_at_optimal=0.1745329
      PathPoint glut_min1_r orig: pelvis (-0.0979456 -0.0625242 -0.152431)
      PathPoint glut_min1_r ins: femur_r (-0.126503 -0.0459363 -0.22045)
    Thelen2003Muscle glut_min2_r: max_isometric_force=267.0411 optimal_fiber_length=0.05036273
        tendon_slack_length=0.0233827 pennation_angle_at_optimal=0
      PathPoint glut_min2_r orig: pelvis (-0.0857643 -0.0421062 -0.142735)
      PathPoint glut_min2_r ins: femur_r (-0.123238 -0.0435524 -0.212994)
    Thelen2003Muscle glut_min3_r: max_isometric_force=302.6466 optimal_fiber_length=0.03696624
        tendon_slack_length=0.04961259 pennation_angle_at_optimal=0.01745329
      PathPoint glut_min3_r orig: pelvis (-0.0700054 -0.0241576 -0.140668)
      PathPoint glut_min3_r ins: femur_r (-0.127784 -0.0417684 -0.21403)
    Thelen2003Muscle grac_r: max_isometric_force=151.7918 optimal_fiber_length=0.3666892 tendon_slack_length=0.1312581
        pennation_angle_at_optimal=0.05235988
      PathPoint grac_r orig: pelvis (-0.024102 -0.0394428 -0.243393)
      PathPoint grac_r via 1: tibia_r (-0.021646 0.0180011 -0.622294)
      PathPoint grac_r via 2: tibia_r (-0.0251266 0.0135915 -0.646818)
      PathPoint grac_r ins: tibia_r (-0.0365815 -0.0114981 -0.68108)
    Thelen2003Muscle iliacus_r: max_isometric_force=1005.386 optimal_fiber_length=0.1034534
        tendon_slack_length=0.1034534 pennation_angle_at_optimal=0.1221731
      PathPoint iliacus_r orig: pelvis (-0.0749229 -0.0305658 -0.101207)
      PathPoint iliacus_r via 1: pelvis (-0.0730087 -0.0797971 -0.190275)
      PathPoint iliacus_r via 2: pelvis (-0.074313 -0.0828301 -0.217507)
      PathPoint iliacus_r via 3: femur_r (-0.079772 -0.0372377 -0.257215)
      PathPoint iliacus_r ins: femur_r (-0.083857 -0.0222113 -0.255742)
    Thelen2003Muscle lat_gas_r: max_isometric_force=639.9617 optimal_fiber_length=0.05869701
        tendon_slack_length=0.3485135 pennation_angle_at_optimal=0.1396263
      PathPoint lat_gas_r orig: femur_r (-0.0743329 -0.00623521 -0.5625)
      PathPoint lat_gas_r via 1: femur_r (-0.0832381 0.0088952 -0.57525)
      PathPoint lat_gas_r ins: calcn_r (-0.054757 0.0385049 -0.972639)
    Thelen2003Muscle med_gas_r: max_isometric_force=1459.825 optimal_fiber_length=0.05630164
        tendon_slack_length=0.3659606 pennation_angle_at_optimal=0.296706
      PathPoint med_gas_r orig: femur_r (-0.0269664 0.00239466 -0.565449)
      PathPoint med_gas_r via 1: femur_r (-0.0345592 0.0215151 -0.580503)
      PathPoint med_gas_r ins: calcn_r (-0.0459196 0.0367156 -0.970869)
    Thelen2003Muscle pect_r: max_isometric_force=249.2384 optimal_fiber_length=0.09846854
        tendon_slack_length=0.03249462 pennation_angle_at_optimal=0
      PathPoint pect_r orig: pelvis (-0.0364863 -0.0692912 -0.210283)
      PathPoint pect_r ins: femur_r (-0.0864746 -0.0222467 -0.276954)
    Thelen2003Muscle per_brev_r: max_isometric_force=548.7592 optimal_fiber_length=0.05389811
        tendon_slack_length=0.1735519 pennation_angle_at_optimal=0.08726646 activation_time_constant=0.0001
        deactivation_time_constant=1
      PathPoint per_brev_r_ori : tibia_r (-0.0766393 0.001527 -0.81609)
      PathPoint per_brev_r_via1 : tibia_r (-0.0729447 0.0113496 -0.953673)
      PathPoint per_brev_r_via2 : tibia_r (-0.0733714 0.00444432 -0.966816)
      PathPoint per_brev_r_via3 : calcn_r (-0.0741045 -0.012758 -0.986872)
      PathPoint per_brev_r_ins : calcn_r (-0.0708241 -0.0475515 -1.0152)
    Thelen2003Muscle per_long_r: max_isometric_force=1189.609 optimal_fiber_length=0.04556241
        tendon_slack_length=0.3207965 pennation_angle_at_optimal=0.1745329 activation_time_constant=0.0001
        deactivation_time_constant=1
      PathPoint per_long_r_ori : tibia_r (-0.0781253 -0.00180448 -0.712727)
      PathPoint per_long_r_via1 : tibia_r (-0.0717993 0.0154277 -0.954531)
      PathPoint per_long_r_via2 : tibia_r (-0.0729286 0.00538521 -0.971309)
      PathPoint per_long_r_via3 : calcn_r (-0.0711254 -0.000297833 -0.978966)
      PathPoint per_long_r_via4 : calcn_r (-0.0608652 -0.0347045 -1.00719)
      PathPoint per_long_r_via5 : calcn_r (-0.0486491 -0.0551674 -1.00933)
      PathPoint per_long_r_ins : calcn_r (-0.0304642 -0.0684325 -1.00338)
    Thelen2003Muscle peri_r: max_isometric_force=416.022 optimal_fiber_length=0.0247974 tendon_slack_length=0.1096808
        pennation_angle_at_optimal=0.1745329
      PathPoint peri_r orig: pelvis (-0.0154129 0.0381327 -0.162762)
      PathPoint peri_r via 1: pelvis (-0.062025 0.0117374 -0.166355)
      PathPoint peri_r ins: femur_r (-0.117179 -0.034084 -0.202953)
    Thelen2003Muscle psoas_r: max_isometric_force=1042.866 optimal_fiber_length=0.09290972
        tendon_slack_length=0.1486555 pennation_angle_at_optimal=0.1396263
      PathPoint psoas_r orig: pelvis (-0.0302269 -0.0124448 -0.0838873)
      PathPoint psoas_r via 1: pelvis (-0.0706891 -0.0822532 -0.192661)
      PathPoint psoas_r via 2: pelvis (-0.0704295 -0.0849454 -0.218608)
      PathPoint psoas_r via 3: femur_r (-0.0756851 -0.0390376 -0.251608)
      PathPoint psoas_r ins: femur_r (-0.0835231 -0.0231741 -0.259294)
    Thelen2003Muscle quad_fem_r: max_isometric_force=356.9918 optimal_fiber_length=0.04980487
        tendon_slack_length=0.0221355 pennation_angle_at_optimal=0
      PathPoint quad_fem_r orig: pelvis (-0.0454618 -0.00447439 -0.246082)
      PathPoint quad_fem_r ins: femur_r (-0.113675 -0.0169252 -0.241227)
    Thelen2003Muscle rect_fem_r: max_isometric_force=1095.337 optimal_fiber_length=0.1218931
        tendon_slack_length=0.3314638 pennation_angle_at_optimal=0.08726646
      PathPoint rect_fem_r orig: pelvis (-0.0845023 -0.0705189 -0.171378)
      PathPoint rect_fem_r ins: tibia_r (-0.0496243 -0.0583041 -0.5493)
    Thelen2003Muscle sar_r: max_isometric_force=146.1699 optimal_fiber_length=0.5392507 tendon_slack_length=0.1037021
        pennation_angle_at_optimal=0
      PathPoint sar_r orig: pelvis (-0.112244 -0.0949269 -0.128587)
      PathPoint sar_r via 1: femur_r (-0.0188625 0.00755086 -0.533292)
      PathPoint sar_r via 2: tibia_r (-0.0193283 0.00858845 -0.612901)
      PathPoint sar_r ins: tibia_r (-0.0353094 -0.0185093 -0.663608)
    Thelen2003Muscle semimem_r: max_isometric_force=1206.838 optimal_fiber_length=0.07925854
        tendon_slack_length=0.3556727 pennation_angle_at_optimal=0.2617994
      PathPoint semimem_r orig: pelvis (-0.0630927 0.00225074 -0.229602)
      PathPoint semimem_r via 1: tibia_r (-0.0395562 0.027359 -0.616887)
      PathPoint semimem_r ins: tibia_r (-0.0382543 0.00844146 -0.628338)
    Thelen2003Muscle semiten_r: max_isometric_force=384.1644 optimal_fiber_length=0.1962528
        tendon_slack_length=0.2494656 pennation_angle_at_optimal=0.08726646
      PathPoint semiten_r orig: pelvis (-0.0502828 0.000468277 -0.247262)
      PathPoint semiten_r via 1: tibia_r (-0.0361693 0.033048 -0.610313)
      PathPoint semiten_r via 2: tibia_r (-0.0349218 0.0242271 -0.64263)
      PathPoint semiten_r via 3: tibia_r (-0.0316284 0.00345556 -0.668345)
      PathPoint semiten_r ins: tibia_r (-0.0425222 -0.011149 -0.691173)
    Thelen2003Muscle soleus_r: max_isometric_force=3325.365 optimal_fiber_length=0.04180351
        tendon_slack_length=0.2090176 pennation_angle_at_optimal=0.4363323
      PathPoint soleus_r orig: tibia_r (-0.0550958 -0.0100802 -0.741011)
      PathPoint soleus_r ins: calcn_r (-0.0502505 0.0330034 -0.972966)
    Thelen2003Muscle tfl_r: max_isometric_force=218.3178 optimal_fiber_length=0.09225129 tendon_slack_length=0.4127031
        pennation_angle_at_optimal=0.05235988
      PathPoint tfl_r orig: pelvis (-0.115482 -0.0837224 -0.123897)
      PathPoint tfl_r via 1: femur_r (-0.116193 -0.0686764 -0.301297)
      PathPoint tfl_r via 2: femur_r (-0.0829436 -0.0246674 -0.589878)
      PathPoint tfl_r ins: tibia_r (-0.0865104 0.00123396 -0.622714)
    Thelen2003Muscle tib_ant_r: max_isometric_force=1141.671 optimal_fiber_length=0.08500392
        tendon_slack_length=0.1934273 pennation_angle_at_optimal=0.08726646 activation_time_constant=0.0001
        deactivation_time_constant=1
      PathPoint tib_ant_r_ori : tibia_r (-0.0578243 -0.0232597 -0.729293)
      PathPoint tib_ant_r_via1 : tibia_r (-0.0392091 -0.04601 -0.926722)
      PathPoint tib_ant_r_ins : calcn_r (-0.0216914 -0.0804111 -0.987777)
    Thelen2003Muscle tib_post_r: max_isometric_force=2003.287 optimal_fiber_length=0.02756531
        tendon_slack_length=0.2756531 pennation_angle_at_optimal=0.2094395 activation_time_constant=0.0001
        deactivation_time_constant=1
      PathPoint tib_post_r_ori : tibia_r (-0.0533808 -0.00832974 -0.687504)
      PathPoint tib_post_r_via1 : tibia_r (-0.0201019 -0.00420009 -0.934141)
      PathPoint tib_post_r_via2 : calcn_r (-0.0295896 -0.0194298 -0.9556)
      PathPoint tib_post_r_ins : calcn_r (-0.02059 -0.0425972 -0.976672)
    Thelen2003Muscle vas_int_r: max_isometric_force=1278.986 optimal_fiber_length=0.1067816
        tendon_slack_length=0.166923 pennation_angle_at_optimal=0.05235988
      PathPoint vas_int_r orig: femur_r (-0.0823806 -0.054769 -0.390008)
      PathPoint vas_int_r via 1: femur_r (-0.0775253 -0.0602526 -0.403747)
      PathPoint vas_int_r ins: tibia_r (-0.0530448 -0.0574555 -0.555446)
    Thelen2003Muscle vas_lat_r: max_isometric_force=1753.102 optimal_fiber_length=0.09883055
        tendon_slack_length=0.184719 pennation_angle_at_optimal=0.08726646
      PathPoint vas_lat_r orig: femur_r (-0.0864387 -0.0426053 -0.382771)
      PathPoint vas_lat_r via 1: femur_r (-0.0921635 -0.0530782 -0.450155)
      PathPoint vas_lat_r ins: tibia_r (-0.0556249 -0.0599795 -0.55065)
    Thelen2003Muscle vas_med_r: max_isometric_force=1212.46 optimal_fiber_length=0.1134543
        tendon_slack_length=0.1606207 pennation_angle_at_optimal=0.08726646
      PathPoint vas_med_r orig: femur_r (-0.0704141 -0.0530733 -0.397278)
      PathPoint vas_med_r via 1: femur_r (-0.0393276 -0.0326812 -0.46147)
      PathPoint vas_med_r ins: tibia_r (-0.0443571 -0.0582616 -0.555588)
    CoordinateActuator pelvis_tilt_coordAct: coordinate=pelvis_tilt optimal_force=100
    CoordinateActuator pelvis_list_coordAct: coordinate=pelvis_list optimal_force=100
    CoordinateActuator pelvis_rotation_coordAct: coordinate=pelvis_rotation optimal_force=100
    CoordinateActuator pelvis_tx_coordAct: coordinate=pelvis_tx optimal_force=100
    CoordinateActuator pelvis_ty_coordAct: coordinate=pelvis_ty optimal_force=100
    CoordinateActuator pelvis_tz_coordAct: coordinate=pelvis_tz optimal_force=100
    CoordinateActuator hip_flexion_r_coordAct: coordinate=hip_flexion_r optimal_force=1
    CoordinateActuator hip_adduction_r_coordAct: coordinate=hip_adduction_r optimal_force=1
    CoordinateActuator hip_rotation_r_coordAct: coordinate=hip_rotation_r optimal_force=1
    CoordinateActuator knee_angle_r_coordAct: coordinate=knee_angle_r optimal_force=1
    CoordinateActuator ankle_angle_r_coordAct: coordinate=ankle_angle_r optimal_force=1
    CoordinateActuator subtalar_angle_r_coordAct: coordinate=subtalar_angle_r optimal_force=1
    CoordinateActuator mtp_angle_r_coordAct: coordinate=mtp_angle_r optimal_force=1
  MarkerSet:
    Marker RPSI: pelvis (-0.0432008 0.0616855 -0.0830747)
    Marker LPSI: pelvis (0.0476247 0.065532 -0.0786332)
    Marker LASI: pelvis (0.12125 -0.132646 -0.119672)
    Marker RASI: pelvis (-0.114189 -0.12625 -0.127356)
    Marker RTHI: femur_r (-0.147168 -0.0338704 -0.443113)
    Marker RKNE: femur_r (-0.121157 -0.0187502 -0.582636)
    Marker RMFC: femur_r (0.0245242 0.0229776 -0.557032)
    Marker RHFB: tibia_r (-0.122288 -0.0126128 -0.622799)
    Marker RSHN: tibia_r (-0.0486713 -0.0451868 -0.701866)
    Marker RMMA: tibia_r (-0.00609255 -0.000857603 -0.939038)
    Marker RANK: tibia_r (-0.0928818 0.00336954 -0.958569)
    Marker RD1M: calcn_r (0.0114955 -0.116782 -1.01006)
    Marker RTOE: calcn_r (-0.0431417 -0.136347 -1.0137)
    Marker RD5M: calcn_r (-0.0908862 -0.106396 -1.03517)
    Marker RHLX: toes_r (0.0148111 -0.133972 -1.02135)
    Marker RTUB: tibia_r (-0.0510177 -0.0518115 -0.636312)
    Marker RHEE: calcn_r (-0.0521391 0.0612914 -0.987037)
    Marker RCPG: calcn_r (-0.063879 0.0726637 -0.956842)
    Marker RPCA: calcn_r (-0.0596878 0.0472084 -0.949002)
    Marker RSTL: calcn_r (-0.0220217 0.0240576 -0.972279)
    Marker RLCA: calcn_r (-0.0886602 0.0199696 -0.979633)
    Marker RP1M: calcn_r (-0.0159431 -0.0833671 -0.971309)
    Marker RP5M: calcn_r (-0.0938311 -0.070272 -1.02877)
