# OpenSim document version 30000
Model:
  length_units: meters
  force_units: N
  gravity: 0 -9.80665 0
  credits:
    Frank Anderson, Peter Loan, Ayman Habib, Ajay Seth, Michael Sherman
  BodySet:
    Body ground: mass=0 mass_center=(0 0 0) inertia_xx=1 inertia_yy=1 inertia_zz=1
    Body pelvis: mass=984738.7 mass_center=(-0.0158544 -0.0495753 0.0728266) inertia_xx=3471.284 inertia_yy=6661.496
        inertia_zz=5697.089 inertia_xy=-99.95392 inertia_xz=35.37725 inertia_yz=-203.6174
        meshes=P0_MRI_Geometries\pelvis.vtp
      CustomJoint ground_pelvis: parent_body=ground location_in_parent=(0 0 0)
          location=(-0.01400388 0.04225937 0.07657939) orientation=(0.286756 1.521299 1.038075)
        Coordinate pelvis_tilt: motion_type=rotational range=(-3.141593 3.141593)
        Coordinate pelvis_list: motion_type=rotational range=(-3.141593 3.141593)
        Coordinate pelvis_rotation: motion_type=rotational range=(-3.141593 3.141593)
        Coordinate pelvis_tx: motion_type=translational range=(-0.5 0.5)
        Coordinate pelvis_ty: motion_type=translational range=(-0.5 0.5)
        Coordinate pelvis_tz: motion_type=translational range=(-0.5 0.5)
        SpatialTransform:
          TransformAxis rotation1: coordinates=pelvis_tilt axis=(0 0 1) LinearFunction(coefficients=1 0)
          TransformAxis rotation2: coordinates=pelvis_list axis=(1 0 0) LinearFunction(coefficients=1 0)
          TransformAxis rotation3: coordinates=pelvis_rotation axis=(0 1 0) LinearFunction(coefficients=1 0)
          TransformAxis translation1: coordinates=pelvis_tx axis=(1 0 0) LinearFunction(coefficients=1 0)
          TransformAxis translation2: coordinates=pelvis_ty axis=(0 1 0) LinearFunction(coefficients=1 0)
          TransformAxis translation3: coordinates=pelvis_tz axis=(0 0 1) LinearFunction(coefficients=1 0)
    Body femur_r: mass=637349.4 mass_center=(0.0844072 -0.0204007 -0.222232) inertia_xx=17580.96 inertia_yy=17753.17
        inertia_zz=480.1469 inertia_xy=-74.81191 inertia_xz=1439.932 inertia_yz=-761.0834
        meshes=P0_MRI_Geometries\femur_r.vtp
      CustomJoint hip_r: parent_body=pelvis location_in_parent=(0.0802614 -0.0265347 0.0184479)
          orientation_in_parent=(0.2867565 1.521299 1.038074) location=(0.0802614 -0.0265347 0.0184479)
          orientation=(-1.503486 1.539599 3.07225)
        Coordinate hip_flexion_r: motion_type=rotational range=(-3.141593 3.141593)
        Coordinate hip_adduction_r: motion_type=rotational range=(-3.141593 3.141593)
        Coordinate hip_rotation_r: motion_type=rotational range=(-3.141593 3.141593)
        SpatialTransform: axes_held_at_zero=(translation1 translation2 translation3)
          TransformAxis rotation1: coordinates=hip_flexion_r axis=(0 0 1) LinearFunction(coefficients=1 0)
          TransformAxis rotation2: coordinates=hip_adduction_r axis=(1 0 0) LinearFunction(coefficients=1 0)
          TransformAxis rotation3: coordinates=hip_rotation_r axis=(0 1 0) LinearFunction(coefficients=1 0)
    Body tibia_r: mass=483078.2 mass_center=(0.0677964 -0.0217568 -0.580913) inertia_xx=8510.966 inertia_yy=8442.283
        inertia_zz=327.4529 inertia_xy=-29.76667 inertia_xz=351.6089 inertia_yz=541.6223
        meshes=(P0_MRI_Geometries\tibia_r.vtp P0_MRI_Geometries\patella_r.vtp)
      CustomJoint knee_r: parent_body=femur_r location_in_parent=(0.0683561 -0.0277865 -0.4080064)
          orientation_in_parent=(-1.503486 1.539599 3.07225) location=(0.0683561 -0.0277865 -0.4080064)
          orientation=(-1.503486 1.539599 3.070319)
        Coordinate knee_angle_r: motion_type=rotational range=(-3.141593 3.141593)
        SpatialTransform: axes_held_at_zero=(rotation2 rotation3 translation1 translation2 translation3)
          TransformAxis rotation1: coordinates=knee_angle_r axis=(0 0 1) LinearFunction(coefficients=1 0)
    Body talus_r: mass=44678.84 mass_center=(0.0533005 -0.0223348 -0.831091) inertia_xx=12.23884 inertia_yy=9.520211
        inertia_zz=11.52313 inertia_xy=-0.1154241 inertia_xz=-0.1043599 inertia_yz=-3.066883
        meshes=P0_MRI_Geometries\talus_r.vtp
      CustomJoint ankle_r: parent_body=tibia_r location_in_parent=(0.0544753 -0.0299213 -0.8338699)
          orientation_in_parent=(1.57243 1.066082 -0.021576) location=(0.0544753 -0.0299213 -0.8338699)
          orientation=(1.57243 1.066082 -0.5147455)
        Coordinate ankle_angle_r: motion_type=rotational range=(-3.141593 3.141593)
        SpatialTransform: axes_held_at_zero=(rotation2 rotation3 translation1 translation2 translation3)
          TransformAxis rotation1: coordinates=ankle_angle_r axis=(0 0 1) LinearFunction(coefficients=1 0)
    Body calcn_r: mass=1 mass_center=(0.0499034 0.52142 0.81907) inertia_xx=48735.56 inertia_yy=43355.87
        inertia_zz=5359.29 inertia_xy=35.94972 inertia_xz=465.2453 inertia_yz=16053.04
        meshes=P0_MRI_Geometries\calcn_r.vtp
      CustomJoint subtalar_r: parent_body=talus_r location_in_parent=(0.0463581 -0.0541741 -0.8494608)
          orientation_in_parent=(-1.403684 0.1268725 -3.120159) location=(0.0463581 -0.0541741 -0.8494608)
          orientation=(-1.403684 0.1268725 -3.120159)
        Coordinate subtalar_angle_r: motion_type=rotational range=(-3.141593 3.141593)
        SpatialTransform: axes_held_at_zero=(rotation2 rotation3 translation1 translation2 translation3)
          TransformAxis rotation1: coordinates=subtalar_angle_r axis=(0 0 1) LinearFunction(coefficients=1 0)
  MarkerSet:
    Marker RPSI: pelvis (0.0397465 -0.140183 0.142079)
    Marker RASI: pelvis (0.0987678 0.0511637 0.0930277)
    Marker LPSI: pelvis (-0.0667532 -0.141544 0.141568)
    Marker LASI: pelvis (-0.123902 0.0560389 0.082841)
    Marker RKNE: femur_r (0.134355 0.00114052 -0.367985)
    Marker RMMA: tibia_r (0.0109139 -0.0179042 -0.804391)
    Marker RANK: tibia_r (0.0939142 -0.0602593 -0.821176)
    Marker RTTUB: tibia_r (0.0677412 0.0209092 -0.474083)
    Marker RD5M: calcn_r (0.00645894 0.0810732 -0.922196)
    Marker RHEE: calcn_r (0.0228959 -0.108307 -0.843645)
