# OpenSim document version 30000
Model OpenSim Model:
  length_units: meters
  force_units: N
  gravity: 0 -9.80665 0
  credits:
    Frank Anderson, Peter Loan, Ayman Habib, Ajay Seth, Michael Sherman
  BodySet:
    Body ground: mass=0 mass_center=(0 0 0) inertia_xx=1 inertia_yy=1 inertia_zz=1
    Body pelvis: mass=13.48744 mass_center=(0.0252897 -0.143594 -0.260819) inertia_xx=0.1207381 inertia_yy=0.1481314
        inertia_zz=0.1160665 inertia_xy=-0.0004892016 inertia_xz=0.001315599 inertia_yz=-0.007470014
        meshes=(TLEM2_Geometries\pelvis.vtp TLEM2_Geometries\pelvis_ST.vtp)
      CustomJoint ground_pelvis: parent_body=ground location_in_parent=(0 0 0)
          location=(0.02307757 -0.1868438 -0.2467073) orientation=(0.2140333 -1.501812 -1.45675)
        Coordinate pelvis_tilt: motion_type=rotational range=(-3.141593 3.141593)
        Coordinate pelvis_list: motion_type=rotational range=(-3.141593 3.141593)
        Coordinate pelvis_rotation: motion_type=rotational range=(-3.141593 3.141593)
        Coordinate pelvis_tx: motion_type=translational range=(-0.5 0.5)
        Coordinate pelvis_ty: motion_type=translational range=(-0.5 0.5)
        Coordinate pelvis_tz: motion_type=translational range=(-0.5 0.5)
        SpatialTransform:
          TransformAxis rotation1: coordinates=pelvis_tilt axis=(0 0 1) LinearFunction(coefficients=1 0)
          TransformAxis rotation2: coordinates=pelvis_list axis=(1 0 0) LinearFunction(coefficients=1 0)
          TransformAxis rotation3: coordinates=pelvis_rotation axis=(0 1 0) LinearFunction(coefficients=1 0)
          TransformAxis translation1: coordinates=pelvis_tx axis=(1 0 0) LinearFunction(coefficients=1 0)
          TransformAxis translation2: coordinates=pelvis_ty axis=(0 1 0) LinearFunction(coefficients=1 0)
          TransformAxis translation3: coordinates=pelvis_tz axis=(0 0 1) LinearFunction(coefficients=1 0)
    Body femur_r: mass=5.687245 mass_center=(-0.0836441 -0.121544 -0.474532) inertia_xx=0.07981587
        inertia_yy=0.07932714 inertia_zz=0.01396802 inertia_xy=0.0004683714 inertia_xz=-0.008271826
        inertia_yz=-0.001575885 meshes=(TLEM2_Geometries\femur_r.vtp TLEM2_Geometries\femur_r_ST.vtp)
      CustomJoint hip_r: parent_body=pelvis location_in_parent=(-0.0640415 -0.1468232 -0.3186937)
          orientation_in_parent=(0.2140061 -1.501812 -1.456777) location=(-0.0640415 -0.1468232 -0.3186937)
          orientation=(-1.442392 -1.136691 -3.089152)
        Coordinate hip_flexion_r: motion_type=rotational range=(-3.141593 3.141593)
        Coordinate hip_adduction_r: motion_type=rotational range=(-3.141593 3.141593)
        Coordinate hip_rotation_r: motion_type=rotational range=(-3.141593 3.141593)
        SpatialTransform: axes_held_at_zero=(translation1 translation2 translation3)
          TransformAxis rotation1: coordinates=hip_flexion_r axis=(0 0 1) LinearFunction(coefficients=1 0)
          TransformAxis rotation2: coordinates=hip_adduction_r axis=(1 0 0) LinearFunction(coefficients=1 0)
          TransformAxis rotation3: coordinates=hip_rotation_r axis=(0 1 0) LinearFunction(coefficients=1 0)
      WrapCylinder Wrap_quads_on_femur_r: xyz_body_rotation=(-1.35793 -1.20993 -3.0122)
          translation=(-0.0772108 -0.127957 -0.682534) quadrant=all radius=0.025 length=0.07
      WrapCylinder Wrap_gastrocs_femur_r: xyz_body_rotation=(1.76052 1.13461 -0.108046)
          translation=(-0.0718889 -0.116287 -0.686749) quadrant=all radius=0.021 length=0.075
    Body tibia_r: mass=2.092682 mass_center=(-0.0743522 -0.100669 -0.8285) inertia_xx=0.01932607 inertia_yy=0.01955968
        inertia_zz=0.002316791 inertia_xy=0.0002021823 inertia_xz=-0.0001240013 inertia_yz=-0.0006080081
        meshes=(TLEM2_Geometries\tibia_r.vtp TLEM2_Geometries\patella_r.vtp TLEM2_Geometries\tibia_r_ST.vtp)
      CustomJoint knee_r: parent_body=femur_r location_in_parent=(-0.0721561 -0.1171155 -0.6854722)
          orientation_in_parent=(-1.381076 -1.134611 -3.033547) location=(-0.0721561 -0.1171155 -0.6854722)
          orientation=(-1.381076 -1.134611 -2.956875)
        Coordinate knee_angle_r: motion_type=rotational range=(-3.141593 3.141593)
        SpatialTransform: axes_held_at_zero=(rotation2 rotation3 translation1 translation2 translation3)
          TransformAxis rotation1: coordinates=knee_angle_r axis=(0 0 1) LinearFunction(coefficients=1 0)
      WrapCylinder Wrap Cylinder on tibia_r: xyz_body_rotation=(-1.214 -1.33823 -2.79819)
          translation=(-0.0789059 -0.115211 -0.772173) quadrant=all radius=0.042 length=0.09
    Body talus_r: mass=0.04637196 mass_center=(-0.0886199 -0.120309 -1.05252) inertia_xx=1.026792e-5
        inertia_yy=9.394607e-6 inertia_zz=9.695969e-6 inertia_xy=1.05546e-6 inertia_xz=1.716263e-6
        inertia_yz=2.392027e-6 meshes=TLEM2_Geometries\talus_r.vtp
      CustomJoint ankle_r: parent_body=tibia_r location_in_parent=(-0.0854917 -0.1160486 -1.055204)
          orientation_in_parent=(-1.46421 -0.5326543 -3.0577) location=(-0.0854917 -0.1160486 -1.055204)
          orientation=(-1.46421 -0.5326543 2.52266)
        Coordinate ankle_angle_r: motion_type=rotational range=(-3.141593 3.141593)
        SpatialTransform: axes_held_at_zero=(rotation2 rotation3 translation1 translation2 translation3)
          TransformAxis rotation1: coordinates=ankle_angle_r axis=(0 0 1) LinearFunction(coefficients=1 0)
    Body calcn_r: mass=0.6855214 mass_center=(-0.0851472 -0.124093 -1.09648) inertia_xx=0.001475542
        inertia_yy=0.00137232 inertia_zz=0.00105756 inertia_xy=0.0003466632 inertia_xz=0.0004104027
        inertia_yz=0.0004305981 meshes=(TLEM2_Geometries\calcn_r.vtp TLEM2_Geometries\calcn_r_ST.vtp)
      CustomJoint subtalar_r: parent_body=talus_r location_in_parent=(-0.0734383 -0.0968945 -1.062139)
          orientation_in_parent=(1.569249 -0.5523726 -0.03186983) location=(-0.0734383 -0.0968945 -1.062139)
          orientation=(1.569249 -0.5523726 -0.03186983)
        Coordinate subtalar_angle_r: motion_type=rotational range=(-3.141593 3.141593)
        SpatialTransform: axes_held_at_zero=(rotation2 rotation3 translation1 translation2 translation3)
          TransformAxis rotation1: coordinates=subtalar_angle_r axis=(0 0 1) LinearFunction(coefficients=1 0)
    Body toes_r: mass=0.08871663 mass_center=(-0.146955 -0.181912 -1.16446) inertia_xx=4.214658e-5
        inertia_yy=2.522793e-5 inertia_zz=4.938614e-5 inertia_xy=4.711224e-6 inertia_xz=2.990517e-6
        inertia_yz=-6.654438e-6 meshes=(TLEM2_Geometries\toes_r.vtp TLEM2_Geometries\toes_r_ST.vtp)
      CustomJoint mtp_r: parent_body=calcn_r location_in_parent=(-0.1301901 -0.1676762 -1.161523)
          orientation_in_parent=(-1.837194 -0.06420028 2.659231) location=(-0.1301901 -0.1676762 -1.161523)
          orientation=(-1.837194 -0.06420028 2.659231)
        Coordinate mtp_angle_r: motion_type=rotational range=(-3.141593 3.141593)
        SpatialTransform: axes_held_at_zero=(rotation2 rotation3 translation1 translation2 translation3)
          TransformAxis rotation1: coordinates=mtp_angle_r axis=(0 0 1) LinearFunction(coefficients=1 0)
  ForceSet:
    Thelen2003Muscle [values shared by the 43 below unless stated]: min_control=0 max_control=1
        max_isometric_force=1000 optimal_fiber_length=0.1 tendon_slack_length=0.2
        pennation_angle_at_optimal=0 [radians]
    Thelen2003Muscle add_brev_r:
      PathPoint add_brev_r orig: pelvis (0.0001024 -0.168284 -0.353058)
      PathPoint add_brev_r ins: femur_r (-0.088292 -0.130372 -0.423828)
    Thelen2003Muscle add_long_r:
      PathPoint add_long_r orig: pelvis (0.0031816 -0.186675 -0.335991)
      PathPoint add_long_r ins: femur_r (-0.0896022 -0.12505 -0.495248)
    Thelen2003Muscle add_mag1_r:
      PathPoint add_mag1_r orig: pelvis (-0.0083213 -0.159746 -0.375882)
      PathPoint add_mag1_r ins: femur_r (-0.0945512 -0.119319 -0.425124)
    Thelen2003Muscle add_mag2_r:
      PathPoint add_mag2_r orig: pelvis (-0.0125455 -0.151716 -0.381052)
      PathPoint add_mag2_r ins: femur_r (-0.0874326 -0.125239 -0.511293)
    Thelen2003Muscle add_mag3_r:
      PathPoint add_mag3_r orig: pelvis (-0.0309462 -0.130454 -0.384295)
      PathPoint add_mag3_r ins: femur_r (-0.0491868 -0.134039 -0.664426)
    Thelen2003Muscle bifemlh_r:
      PathPoint bifemlh_r orig: pelvis (-0.0504833 -0.114922 -0.375058)
      PathPoint bifemlh_r via 1: tibia_r (-0.0807759 -0.0727037 -0.695858)
      PathPoint bifemlh_r ins: tibia_r (-0.091912 -0.0752355 -0.719288)
    Thelen2003Muscle bifemsh_r:
      PathPoint bifemsh_r orig: femur_r (-0.0895442 -0.124993 -0.500117)
      PathPoint bifemsh_r via 1: tibia_r (-0.0807759 -0.0727037 -0.695858)
      PathPoint bifemsh_r ins: tibia_r (-0.091912 -0.0752355 -0.719288)
    Thelen2003Muscle ext_dig_r:
      PathPoint ext_dig_r orig: tibia_r (-0.0947761 -0.087445 -0.791891)
      PathPoint ext_dig_r via 1: tibia_r (-0.100647 -0.122923 -1.02458)
      PathPoint ext_dig_r via 2: calcn_r (-0.114862 -0.133385 -1.08739)
      PathPoint ext_dig_r viaextra: calcn_r (-0.138995 -0.164547 -1.15837)
      PathPoint ext_dig_r via 4: toes_r (-0.138837 -0.165793 -1.1602)
      PathPoint ext_dig_r via 5: toes_r (-0.157198 -0.171734 -1.15679)
      PathPoint ext_dig_r ins: toes_r (-0.172004 -0.177663 -1.16986)
    Thelen2003Muscle ext_hal_r:
      PathPoint ext_hal_r orig: tibia_r (-0.0921525 -0.0875731 -0.829732)
      PathPoint ext_hal_r via 1: tibia_r (-0.0946963 -0.129332 -1.02396)
      PathPoint ext_hal_r via 2: calcn_r (-0.106956 -0.150702 -1.0691)
      PathPoint ext_hal_r via 2.1: calcn_r (-0.124507 -0.19214 -1.14371)
      PathPoint ext_hal_r via 5: toes_r (-0.135354 -0.194909 -1.14635)
      PathPoint New_Landmark_1: toes_r (-0.159109 -0.202472 -1.15065)
      PathPoint ext_hal_r ins: toes_r (-0.178174 -0.206327 -1.16107)
    Thelen2003Muscle flex_dig_r:
      PathPoint flex_dig_r orig: tibia_r (-0.0756682 -0.115018 -0.856674)
      PathPoint flex_dig_r via 1: tibia_r (-0.0519359 -0.121057 -1.03843)
      PathPoint flex_dig_r via 2: calcn_r (-0.0612594 -0.122279 -1.06437)
      PathPoint flex_dig_r via 3: calcn_r (-0.0759767 -0.136771 -1.08153)
      PathPoint flex_dig_viaExtra: calcn_r (-0.123689 -0.1645 -1.16574)
      PathPoint flex_dig_r via 5: toes_r (-0.138238 -0.168364 -1.17047)
      PathPoint flex_dig_r via 6: toes_r (-0.157395 -0.173605 -1.16699)
      PathPoint flex_dig_r ins: toes_r (-0.166933 -0.176932 -1.1713)
    Thelen2003Muscle flex_hal_r:
      PathPoint flex_hal_r orig: tibia_r (-0.0898727 -0.090486 -0.878561)
      PathPoint flex_hal_r via 1: tibia_r (-0.0511843 -0.117594 -1.04013)
      PathPoint flex_hal_r via 2: calcn_r (-0.0662456 -0.12051 -1.06854)
      PathPoint flex_hal_r via 3: calcn_r (-0.0880403 -0.15597 -1.1122)
      PathPoint flex_hal_r viaextra: calcn_r (-0.115298 -0.186626 -1.16199)
      PathPoint flex_hal_r via 5: toes_r (-0.118572 -0.188807 -1.15953)
      PathPoint flex_hal_r ins: toes_r (-0.161348 -0.206566 -1.16328)
    Thelen2003Muscle gem_r:
      PathPoint gem_r orig: pelvis (-0.0547072 -0.119627 -0.351511)
      PathPoint gem_r ins: femur_r (-0.105661 -0.122796 -0.317576)
    Thelen2003Muscle glut_max1_r:
      PathPoint glut_max1_r orig: pelvis (-0.0376708 -0.0753941 -0.20978)
      PathPoint glut_max1_r via 1: pelvis (-0.0637375 -0.0809008 -0.27136)
      PathPoint glut_max1_r via 2: femur_r (-0.0893514 -0.0937315 -0.336976)
      PathPoint glut_max1_r ins: femur_r (-0.104402 -0.106162 -0.364679)
    Thelen2003Muscle glut_max2_r:
      PathPoint glut_max2_r orig: pelvis (-0.0294555 -0.0753479 -0.256155)
      PathPoint glut_max2_r via 1: pelvis (-0.0691865 -0.0741008 -0.315566)
      PathPoint glut_max2_r via 2: femur_r (-0.0809238 -0.0973495 -0.363463)
      PathPoint glut_max2_r ins: femur_r (-0.105444 -0.113963 -0.40611)
    Thelen2003Muscle glut_max3_r:
      PathPoint glut_max3_r orig: pelvis (0.00459625 -0.0690938 -0.321984)
      PathPoint glut_max3_r via 1: pelvis (-0.0272236 -0.0840588 -0.385068)
      PathPoint glut_max3_r via 2: femur_r (-0.0702822 -0.109954 -0.411279)
      PathPoint glut_max3_r ins: femur_r (-0.0970735 -0.117642 -0.435207)
    Thelen2003Muscle glut_med1_r:
      PathPoint glut_med1_r orig: pelvis (-0.0922851 -0.144226 -0.228327)
      PathPoint glut_med1_r ins: femur_r (-0.116762 -0.110826 -0.322361)
    Thelen2003Muscle glut_med2_r:
      PathPoint glut_med2_r orig: pelvis (-0.0483882 -0.105907 -0.218816)
      PathPoint glut_med2_r ins: femur_r (-0.11046 -0.109188 -0.317072)
    Thelen2003Muscle glut_med3_r:
      PathPoint glut_med3_r orig: pelvis (-0.0377166 -0.0855235 -0.260527)
      PathPoint glut_med3_r ins: femur_r (-0.106894 -0.106352 -0.318289)
    Thelen2003Muscle glut_min1_r:
      PathPoint glut_min1_r orig: pelvis (-0.0810632 -0.153072 -0.261822)
      PathPoint glut_min1_r ins: femur_r (-0.118728 -0.126506 -0.315999)
    Thelen2003Muscle glut_min2_r:
      PathPoint glut_min2_r orig: pelvis (-0.0741969 -0.138471 -0.263881)
      PathPoint glut_min2_r ins: femur_r (-0.116921 -0.122283 -0.314263)
    Thelen2003Muscle glut_min3_r:
      PathPoint glut_min3_r orig: pelvis (-0.0607158 -0.121468 -0.269054)
      PathPoint glut_min3_r ins: femur_r (-0.11528 -0.11863 -0.313949)
    Thelen2003Muscle grac_r:
      PathPoint grac_r orig: pelvis (-0.0090628 -0.158913 -0.37634)
      PathPoint grac_r via 1: tibia_r (-0.0329964 -0.108019 -0.694918)
      PathPoint grac_r via 2: tibia_r (-0.0422814 -0.116589 -0.718028)
      PathPoint grac_r viaExtra: tibia_r (-0.0508487 -0.127098 -0.735044)
      PathPoint grac_r ins: tibia_r (-0.0698153 -0.13259 -0.751971)
    Thelen2003Muscle iliacus_r:
      PathPoint iliacus_r orig: pelvis (-0.0601339 -0.11933 -0.224713)
      PathPoint iliacus_r via 1: pelvis (-0.0577557 -0.185356 -0.305154)
      PathPoint iliacus_r via 2: pelvis (-0.0595518 -0.184364 -0.331298)
      PathPoint iliacus_r via 3: femur_r (-0.0712188 -0.145984 -0.368084)
      PathPoint iliacus_r ins: femur_r (-0.0708569 -0.123965 -0.374154)
    Thelen2003Muscle lat_gas_r:
      PathPoint lat_gas_r orig: femur_r (-0.092961 -0.105646 -0.659595)
      PathPoint lat_gas_r via 1: femur_r (-0.0872982 -0.0822748 -0.675806)
      PathPoint lat_gas_r ins: calcn_r (-0.049435 -0.08615 -1.04305)
    Thelen2003Muscle med_gas_r:
      PathPoint med_gas_r orig: femur_r (-0.0551985 -0.127605 -0.663479)
      PathPoint med_gas_r via 1: femur_r (-0.0384947 -0.0979307 -0.68277)
      PathPoint med_gas_r ins: calcn_r (-0.0465421 -0.0918477 -1.04365)
    Thelen2003Muscle pect_r:
      PathPoint pect_r orig: pelvis (-0.024184 -0.177192 -0.329642)
      PathPoint pect_r ins: femur_r (-0.0862083 -0.124675 -0.391502)
    Thelen2003Muscle peri_r:
      PathPoint peri_r orig: pelvis (-0.0129767 -0.0652813 -0.294521)
      PathPoint peri_r via 1: pelvis (-0.0433109 -0.087009 -0.299249)
      PathPoint peri_r ins: femur_r (-0.104979 -0.122546 -0.318485)
    Thelen2003Muscle psoas_r:
      PathPoint psoas_r orig: pelvis (-0.0017344 -0.108135 -0.172848)
      PathPoint psoas_r via 1: pelvis (-0.0528942 -0.187593 -0.306996)
      PathPoint psoas_r via 2: pelvis (-0.0595518 -0.190564 -0.331298)
      PathPoint psoas_r via 3: femur_r (-0.0690834 -0.146733 -0.365099)
      PathPoint psoas_r ins: femur_r (-0.0703737 -0.124384 -0.371963)
    Thelen2003Muscle quad_fem_r:
      PathPoint quad_fem_r orig: pelvis (-0.051456 -0.106287 -0.376016)
      PathPoint quad_fem_r ins: femur_r (-0.0911449 -0.102999 -0.347365)
    Thelen2003Muscle sar_r:
      PathPoint sar_r orig: pelvis (-0.0943118 -0.179137 -0.245779)
      PathPoint sar_r via 1: femur_r (-0.03361 -0.131781 -0.64631)
      PathPoint sar_r via 2: tibia_r (-0.0380156 -0.125564 -0.718682)
      PathPoint sar_r via 3: tibia_r (-0.0521892 -0.132429 -0.733288)
      PathPoint sar_r ins: tibia_r (-0.0823293 -0.135854 -0.755691)
    Thelen2003Muscle semimem_r:
      PathPoint semimem_r orig: pelvis (-0.0530453 -0.119481 -0.369225)
      PathPoint semimem_r via 1: tibia_r (-0.0443004 -0.104126 -0.700195)
      PathPoint semimem_r ins: tibia_r (-0.0490881 -0.110767 -0.713992)
    Thelen2003Muscle semiten_r:
      PathPoint semiten_r orig: pelvis (-0.0427931 -0.116518 -0.38308)
      PathPoint semiten_r via 1: tibia_r (-0.0367209 -0.104201 -0.693403)
      PathPoint semiten_r via 2: tibia_r (-0.0424138 -0.109656 -0.716915)
      PathPoint semiten_r via 3: tibia_r (-0.0562115 -0.123848 -0.740739)
      PathPoint semiten_r ins: tibia_r (-0.0687444 -0.129743 -0.762248)
    Thelen2003Muscle soleus_r:
      PathPoint soleus_r orig: tibia_r (-0.0837726 -0.11027 -0.810077)
      PathPoint soleus_r ins: calcn_r (-0.0479905 -0.0887935 -1.043)
    Thelen2003Muscle tfl_r:
      PathPoint tfl_r orig: pelvis (-0.0963349 -0.157831 -0.228345)
      PathPoint tfl_r via 1: femur_r (-0.138503 -0.143226 -0.400397)
      PathPoint tfl_r via 2: femur_r (-0.114891 -0.112967 -0.677969)
      PathPoint tfl_r ins: tibia_r (-0.11355 -0.0956635 -0.71531)
    Thelen2003Muscle tib_ant_r:
      PathPoint tib_ant_r orig: tibia_r (-0.0949262 -0.118967 -0.820938)
      PathPoint tib_ant_r via 2: tibia_r (-0.100594 -0.127765 -0.879479)
      PathPoint tib_ant_r via 1: tibia_r (-0.0874832 -0.135194 -1.02388)
      PathPoint RBM1_tib_ant_r ins: calcn_r (-0.101171 -0.168983 -1.10646)
    Thelen2003Muscle per_tert_r:
      PathPoint per_tert_r orig: tibia_r (-0.0915153 -0.0915038 -0.923385)
      PathPoint per_tert_r via 1: tibia_r (-0.103737 -0.115079 -1.02659)
      PathPoint RFSM5per_tert_r ins: calcn_r (-0.109044 -0.112991 -1.12032)
    Thelen2003Muscle per_brev_r:
      PathPoint per_brev_r orig: tibia_r (-0.0888372 -0.0838164 -0.905998)
      PathPoint per_brev_r via 1: tibia_r (-0.0816063 -0.0832661 -1.04382)
      PathPoint per_brev_r via 2: tibia_r (-0.0856088 -0.0860806 -1.05476)
      PathPoint per_brev_r via 3: calcn_r (-0.0897267 -0.0969709 -1.09044)
      PathPoint RFMT_per_brev_r ins: calcn_r (-0.0930541 -0.102234 -1.11782)
    Thelen2003Muscle per_long_r:
      PathPoint per_long_r orig: tibia_r (-0.0922719 -0.0775948 -0.809061)
      PathPoint per_long_r via 1: tibia_r (-0.0811568 -0.0825403 -1.04553)
      PathPoint per_long_r via 2: tibia_r (-0.0843236 -0.0850542 -1.05661)
      PathPoint per_long_r via 3: calcn_r (-0.0843497 -0.0910685 -1.08319)
      PathPoint per_long_r via 4: calcn_r (-0.0910083 -0.103851 -1.11385)
      PathPoint per_long_r via 5: calcn_r (-0.0909186 -0.122052 -1.11634)
      PathPoint RFIM1per_long_r ins: calcn_r (-0.0932236 -0.156907 -1.12033)
    Thelen2003Muscle tib_post_r:
      PathPoint tib_post_r orig: tibia_r (-0.0775722 -0.111108 -0.791583)
      PathPoint tib_post_r via 1: tibia_r (-0.0503625 -0.124075 -1.03902)
      PathPoint tib_post_r via 2: calcn_r (-0.0575433 -0.123899 -1.05782)
      PathPoint RINAVtib_post_r ins: calcn_r (-0.080045 -0.1397 -1.07936)
    Thelen2003Muscle vas_med_r:
      PathPoint vas_med_r orig: femur_r (-0.0897087 -0.146685 -0.504769)
      PathPoint vas_med_r via 1: femur_r (-0.0846387 -0.161807 -0.568171)
      PathPoint vas_med_r ins: tibia_r (-0.0933885 -0.157709 -0.65014)
      PathPoint vas_med_pat: tibia_r (-0.0984731 -0.161616 -0.685383)
      PathPoint vas_med_pat_ins: tibia_r (-0.102052 -0.140485 -0.730517)
    Thelen2003Muscle vas_lat_r:
      PathPoint vas_lat_r orig: femur_r (-0.108063 -0.128319 -0.482228)
      PathPoint vas_lat_r via 1: femur_r (-0.123004 -0.143212 -0.54718)
      PathPoint vas_lat_r ins: tibia_r (-0.107237 -0.150259 -0.65011)
      PathPoint vas_lat_pat: tibia_r (-0.109935 -0.154566 -0.685548)
      PathPoint vas_lat_pat_ins: tibia_r (-0.108543 -0.133856 -0.730478)
    Thelen2003Muscle vas_int_r:
      PathPoint vas_int_r orig: femur_r (-0.107021 -0.14741 -0.488954)
      PathPoint vas_int_r via 1: femur_r (-0.11066 -0.157092 -0.503454)
      PathPoint vas_int_r ins: tibia_r (-0.100271 -0.1537 -0.649769)
      PathPoint vas_int_pat: tibia_r (-0.1037 -0.158159 -0.688127)
      PathPoint vas_int_pat_ins: tibia_r (-0.105692 -0.137659 -0.730224)
    Thelen2003Muscle rect_fem_r:
      PathPoint rect_fem_r orig: pelvis (-0.0715829 -0.175534 -0.281012)
      PathPoint rect_fem_r ins: tibia_r (-0.0989346 -0.151657 -0.64918)
      PathPoint rec_fem_pat: tibia_r (-0.1037 -0.158159 -0.688127)
      PathPoint rect_fem_pat_inf: tibia_r (-0.105692 -0.137659 -0.730224)
  MarkerSet:
    Marker R.ASIS: pelvis (-0.096297 -0.188596 -0.238647)
    Marker R.PSIS: pelvis (-0.0194991 -0.0600284 -0.231082)
    Marker L.PSIS: pelvis (0.0596638 -0.0593961 -0.238014)
    Marker L.ASIS: pelvis (0.142452 -0.185092 -0.254767)
    Marker R.FemEpic.Med: femur_r (-0.0425698 -0.143691 -0.690723)
    Marker R.FemEpic.Lat: femur_r (-0.113136 -0.100709 -0.681728)
    Marker R.ThighCluster.Med: femur_r (-0.147573 -0.15514 -0.443021)
    Marker R.ThighCluster.Lat: femur_r (-0.146474 -0.10437 -0.440243)
    Marker R.ThighCluster.Caud: femur_r (-0.14459 -0.130553 -0.490171)
    Marker R.TibiaMal.Med: tibia_r (-0.0621064 -0.140124 -1.0378)
    Marker R.TibiaTub: tibia_r (-0.10807 -0.136458 -0.741225)
    Marker R.FibHead: tibia_r (-0.109507 -0.0766585 -0.734366)
    Marker R.TibiaMal.Lat: tibia_r (-0.0945205 -0.0804898 -1.04804)
    Marker R.TibiaEpic.Med: tibia_r (-0.0513239 -0.139154 -0.715075)
    Marker R.ShankCluster.Up: tibia_r (-0.0999261 -0.136037 -0.83139)
    Marker R.ShankCluster.Med: tibia_r (-0.101435 -0.130403 -0.879241)
    Marker R.ShankCluster.Down: tibia_r (-0.0764517 -0.132488 -0.861643)
    Marker R.5thMeta.Dist: calcn_r (-0.128216 -0.131481 -1.16745)
    Marker R.1stMeta.Dist: calcn_r (-0.118039 -0.201123 -1.1479)
    Marker R.Navicular: calcn_r (-0.0671274 -0.129298 -1.05691)
    Marker R.Heel: calcn_r (-0.0373834 -0.0841428 -1.0519)
    Marker R.5thMeta.Prox: calcn_r (-0.0975161 -0.101131 -1.12126)
    Marker R.BigToe: toes_r (-0.177197 -0.20422 -1.15773)
